Simulations: Version=170
  DataStore
    ExcelInput FARObserved: FileNames=[FARObserved.xlsx]; SheetNames=[FARObserved]
    ExcelInput RainShelter: FileNames=[MaizeObservation.xlsx]; SheetNames=[Observed]
    Input ABlockObserved: FileNames=[AblockObserved.txt]
    Input ABlockSWC: FileNames=[AblockSWC.txt]
    PredictedObserved: PredictedTableName=PredictedLeach; ObservedTableName=ObservedLeach; FieldNameUsedForMatch=SimulationName; FieldName2UsedForMatch=Clock.Today; AllColumns=false
      Tests: POName=PredictedObserved
        AcceptedStats:
          Name       n   Slope     Intercept  SEslope    SEintercept  R2        RMSE     NSE       ME      MAE      RSR
          N          36  1         0          0          0            1         0        1         0       0        0
          NLeaching  36  0.958419  13.1282    0.0754741  7.50894      0.825869  32.4458  0.783278  10.176  16.0194  0.459023
        AcceptedStatsName=Name n Slope Intercept SEslope SEintercept R2 RMSE NSE ME MAE RSR
    PredictedObserved PredictedObserved_RSSoilWater: PredictedTableName=Report; ObservedTableName=Observed; FieldNameUsedForMatch=SimulationName; FieldName2UsedForMatch=Clock.Today; AllColumns=false
      Tests: POName=PredictedObserved_RSSoilWater
        AcceptedStats:
          Name                  n    Slope       Intercept    SEslope    SEintercept  R2         RMSE       NSE          ME            MAE        RSR
          ProfileWater          126  1.1592      -37.8029     0.0490602  15.5401      0.818257   26.9272    0.593019     12.1736       19.6857    0.635414
          Soil.SoilWater.SW(1)  126  1.25789     -0.00648064  0.035765   0.00649649   0.90889    0.0519074  0.574294     0.0356309     0.037277   0.649867
          Soil.SoilWater.SW(2)  126  1.1717      -0.03291     0.0452973  0.00964034   0.84365    0.0287878  0.714034     0.00244251    0.0226019  0.532632
          Soil.SoilWater.SW(3)  126  0.965056    0.0122203    0.0308585  0.00623278   0.887481   0.0179183  0.868892     0.00537741    0.0147627  0.360648
          Soil.SoilWater.SW(4)  126  0.709467    0.066874     0.0284471  0.0057517    0.833779   0.0178229  0.750964     0.00905499    0.0153507  0.497051
          Soil.SoilWater.SW(5)  126  0.296212    0.151906     0.0505935  0.0102712    0.216569   0.0308806  0.0734977    0.0108218     0.0261216  0.958723
          Soil.SoilWater.SW(6)  126  0.0964378   0.186707     0.0256049  0.00512132   0.102656   0.0209168  -0.00966551  0.00696481    0.0176272  1.00083
          Soil.SoilWater.SW(7)  126  -0.0536994  0.211694     0.0111469  0.00226074   0.157652   0.0264472  -0.125935    -0.000390067  0.0216854  1.05688
          Soil.SoilWater.SW(8)  126  -0.0578702  0.207785     0.0201434  0.00415981   0.0624073  0.0287743  -0.297288    -0.00903432   0.0221687  1.13446
        AcceptedStatsName=Name n Slope Intercept SEslope SEintercept R2 RMSE NSE ME MAE RSR
  Folder Replacements
    Plant SCRUM: PlantType=SCRUM
      Memo TitlePage
        # SCRUM: the Simple Crop Resource Uptake Model

        _Hamish Brown and Rob Zyskowski, Plant and Food Research, New Zealand_

        This model has been built using the Plant Modelling Framework (PMF) of [brown_plant_2014] to simulate a range of different crops in simulations where water and nitrogen balance are of interest but a fully mechanistic plant model is not needed or is not available. It is a daily time step implementation of the crop model that is used on the Overseer nutrient balance model [Cichota_etal_2010].  It uses simple sigmoidal functions for estimating daily cover and biomass deltas to give realistic water and nitrogen demands. It does not simulate potential yield, this is specified as an input. Yield will be reduced below the specified potential yield if N or water supplies from the soil are insufficient to meet demand. The model has been paramaterised for simulating water and nitrogen balances of cropping rotations in New Zealand (where over 50 different crop types are grown and it is not feasible to produce full crop models for each of these).  Because of this the model is not as generically applicable as full APSIM crop models.   It may be adapted for other purposes and other crop types may be added but the user will need to keep in mind that because it is a simple model the the parameters might need changing for crops in different locations or for crops sown at different times of the year.  Some sensibility testing or validation is recommended before application in different sutuations.

        SCRUM has a simple phenology model which divides the crop growth into three main phases; a vegetative phase when the canopy is expanding, a reproductive phase when product is being formed and a senescing phase when the canopy is contracting.  SCRUM has 4 organ classes to represent different biomass components and the real biomass components that these classes represent changes from crop to crop:
           1. A Simple leaf class called <b>Stover</b> which represents the unharvested parts of the plant.  Generally, this represents the leaf and stem components of the crop but for crops where stem and leaf are part of the harvested product (e.g forages and leafy vegetables) than stover is the residual fraction of leaf and stem that is not harvested.
           2. A Generic organ class called <b>Product</b> which represents the plant parts that are harvested and removed from the field.  This could represent grain, fruits, tubers, leaf or stem depending on what sort of crop is being represented.
           3. A Root organ which extracts water and nitrogen from the soil for plant growth and returns biomass to the soil on harvest
           4. A Nodule organ which is only activated and fixes nitrogen for the legume crops.
        An Arbitrator is also included which determines the allocation of drymatter and nitrogen biomass between each of these organs.

        #Inclusion in APSIM simulations
        A scrum crop is included in a simulation the same as any other APSIM crop
         * The SCRUM object needs to be dragged or copied from the Crop folder in the tool box into the field of your simulation.
         * It is then planted with a sowing rule
        ~~~
        SCRUM.Sow(cultivar: Wheat_Autumn, population: 1, depth: 10, rowSpacing: 150);
        ~~~
          * Note that SCRUM has no notion of population or rowSpacing but these parameters are required by the Sow method so filler values are provided
          * To specify an expected Expected Yield that differs to the defalt value provided, included the following code in a manager script to be executed on the day of sowing.
        ~~~
         zone.Set("[SCRUM].Product.ExpectedYield.Value()", ResetValue);
        ~~~
        * SCRUM can be Harvested, Cut, Grazed and Pruned like other crops.  Defalt proportions of the biomass in each organ are removed from the sysem and/or added to the fields residue pools.  Note that defalt removal fraction for product on harvest is 0 (becaue it is represented with a generic organ) so more appropriate removal fractions should be sepcified in a manager script as follows:
        ~~~
        [EventSubscribe("Commencing")]
        private void OnSimulationCommencing(object sender, EventArgs e)
        {
          Remove = new RemovalFractions(SCRUM.Organs);
        }
        [EventSubscribe("DoManagement")]
        private void OnDoManagement(object sender, EventArgs e)
        {
          if (Clock.Today.Date == HarvestDate2)
          {
            Remove.SetFractionLiveToRemove("Product", 1.0);
            Remove.SetFractionLiveToRemove("Stover", 0.05);
            Remove.SetFractionLiveToResidue("Stover",0.95)
            SCRUM.Harvest(Remove);
            SCRUM.EndCrop();
          }
        }
        ~~~
        * A Remove class as shown above can be sent with Harvest, Cut, Graze and Prune events to specificy the proportions of removals.
         * Once a crop has been ended the field is open to plant another crop using another APSIM crop model or sowing another SCRUM crop.
      Phenology
        Memo Description
          As ThermalTime accumulates the crop progresses through the following phases:
        WeightedTemperatureFunction ThermalTime: MaximumTemperatureWeighting=0.5
          XYPairs: X=[0, 30, 40]; Y=[0, 30, 0]
        EmergingPhase Emerging: Start=Seed; End=Emergence; IsEmerged=true; TTForTimeStep=0
          VariableReference ThermalTime: VariableName=[Phenology].ThermalTime
          MultiplyFunction Target
            VariableReference SowingDepth: VariableName=[Plant].SowingData.Depth
            Constant ShootRate: FixedValue=5; Units=oCd/mm
        GenericPhase Seedling: Start=Emergence; End=Seedling; IsEmerged=true
          Memo Description
            The phase that runs from emergence until the seedlings are established (later that emergence)
          Constant Target: FixedValue=0; Units=<sup>o</sup>Cd
            Memo Param value set at establishment
              SCRUM calculates this parameter value during run-time when the crop is established from parameter values set in the relevent SCRUMcrop and SCRUMmanagement objects
          VariableReference Progression: VariableName=[Phenology].ThermalTime
        GenericPhase Vegetative: Start=Seedling; End=Vegetative; IsEmerged=true
          Memo Description
            During the vegetative phase the crop is producing leaf and stem and closing its canopy
          Constant Target: FixedValue=0; Units=<sup>o</sup>Cd
            Memo Param value set at establishment
              SCRUM calculates this parameter value during run-time when the crop is established from parameter values set in the relevent SCRUMcrop and SCRUMmanagement objects
          VariableReference Progression: VariableName=[Phenology].ThermalTime
        GenericPhase EarlyReproductive: Start=Vegetative; End=EarlyReproductive; IsEmerged=true
          Memo Description
            During the early reproductive stage the crop will be flowering
          Constant Target: FixedValue=0; Units=<sup>o</sup>Cd
            Memo Param value set at establishment
              SCRUM calculates this parameter value during run-time when the crop is established from parameter values set in the relevent SCRUMcrop and SCRUMmanagement objects
          VariableReference Progression: VariableName=[Phenology].ThermalTime
        GenericPhase MidReproductive: Start=EarlyReproductive; End=MidReproductive; IsEmerged=true
          Memo Description
            During this plant has started grain filling.
          Constant Target: FixedValue=0; Units=<sup>o</sup>Cd
            Memo Param value set at establishment
              SCRUM calculates this parameter value during run-time when the crop is established from parameter values set in the relevent SCRUMcrop and SCRUMmanagement objects
          VariableReference Progression: VariableName=[Phenology].ThermalTime
        GenericPhase LateReproductive: Start=MidReproductive; End=LateReproductive; IsEmerged=true
          Memo Description
            During this phase the crop is completing grain filling
          Constant Target: FixedValue=0; Units=<sup>o</sup>Cd
            Memo Param value set at establishment
              SCRUM calculates this parameter value during run-time when the crop is established from parameter values set in the relevent SCRUMcrop and SCRUMmanagement objects
          VariableReference Progression: VariableName=[Phenology].ThermalTime
        GenericPhase Maturity: Start=LateReproductive; End=Maturity; IsEmerged=true
          Memo Description
            Grain filling is nearly complete
          Constant Target: FixedValue=0; Units=<sup>o</sup>Cd
            Memo Param value set at establishment
              SCRUM calculates this parameter value during run-time when the crop is established from parameter values set in the relevent SCRUMcrop and SCRUMmanagement objects
          VariableReference Progression: VariableName=[Phenology].ThermalTime
        GenericPhase Ripe: Start=Maturity; End=Ripe; IsEmerged=true
          Memo Description
            During this phase grains are drying down to be ready for harvest
          Constant Target: FixedValue=0; Units=<sup>o</sup>Cd
            Memo Param value set at establishment
              SCRUM calculates this parameter value during run-time when the crop is established from parameter values set in the relevent SCRUMcrop and SCRUMmanagement objects
          VariableReference Progression: VariableName=[Phenology].ThermalTime
        EndPhase ReadyForHarvesting: Start=Ripe; End=Unused; IsEmerged=true
          VariableReference ThermalTime: VariableName=[Phenology].ThermalTime
      OrganArbitrator Arbitrator
        BiomassTypeArbitrator DMArbitration
          Folder PotentialPartitioningMethods
            ReallocationMethod
            AllocateFixationMethod
            RetranslocationMethod
            SendPotentialDMAllocationsMethod
          Folder AllocationMethods
            NutrientConstrainedAllocationMethod
            DryMatterAllocationsMethod
          RelativeAllocation ArbitrationMethod
        BiomassTypeArbitrator NArbitration
          Folder PotentialPartitioningMethods
            ReallocationMethod
          Folder ActualPartitioningMethods
            AllocateFixationMethod
            RetranslocationMethod
          Folder AllocationMethods
            NitrogenAllocationsMethod
          RelativeAllocation ArbitrationMethod
          AllocateUptakesMethod
        WaterUptakeMethod
        NitrogenUptakeMethod
      GenericOrgan Product: IsAboveGround=true
        Memo Description
          It is the biomass that is removed from the crop at harvest and may include grain, root, leaf, stem, pod or any other organ type depending on the type of crop and how it is harvested.
        Constant MaxNConcAtMaturity: FixedValue=0
          Memo Param value set at establishment
            SCRUM calculates this parameter value during run-time when the crop is established from parameter values set in the relevent SCRUMcrop and SCRUMmanagement objects
        AddFunction MaximumNConc
          VariableReference MaxNConcAtMaturity: VariableName=[Product].MaxNConcAtMaturity
          MultiplyFunction EarlyNConcElevation
            SubtractFunction
              VariableReference MaxNConcAtSeedling: VariableName=[SCRUM].MaxNConcAtSeedling
              VariableReference MaxNConcAtMaturity: VariableName=[Product].MaxNConcAtMaturity
            LinearInterpolationFunction DilutionCurve
              XYPairs: X=[1, 3, 4, 5, 6, 7]; Y=[1, 1, 0.1, 0.02, 0, 0]
              VariableReference XValue: VariableName=[Phenology].Stage
        MultiplyFunction CriticalNConc
          VariableReference MaxNConcAtMaturity: VariableName=[Product].MaxNConcAtMaturity
          Constant StructuralNFactor: FixedValue=0.6
        MultiplyFunction MinimumNConc
          VariableReference MaxNConcAtMaturity: VariableName=[Product].MaxNConcAtMaturity
          Constant StructuralNFactor: FixedValue=0.6
        Constant NReallocationFactor: FixedValue=0
        Constant RemobilisationCost: FixedValue=0
        Constant ExpectedYield: FixedValue=0
          Memo Param value set at establishment
            SCRUM calculates this parameter value during run-time when the crop is established from parameter values set in the relevent SCRUMcrop and SCRUMmanagement objects
        Constant DryMatterContent: FixedValue=0
          Memo Param value set at establishment
            SCRUM calculates this parameter value during run-time when the crop is established from parameter values set in the relevent SCRUMcrop and SCRUMmanagement objects
        SubtractFunction WaterContent
          Memo Description
            This is used to convert the total Dry Matter of this organ back to fresh mass once daily partitining is complete.
          Constant One: FixedValue=1
          VariableReference DMcontent: VariableName=[Product].DryMatterContent
        MultiplyFunction DryYield
          Memo Description
            This variable is the product yield at harvest time of the crop in g/m2 dry weight
          VariableReference FreshYld: VariableName=[Product].ExpectedYield
          VariableReference DMPercent: VariableName=[Product].DryMatterContent
        ExpressionFunction Yield: Expression=(divide(1,[Product].DryMatterContent,0)*[Product].Wt)/100
          Memo Description
            Fresh yield (DM and moisture content) in t/ha
        Constant HarvestIndex: FixedValue=0
          Memo Param value set at establishment
            SCRUM calculates this parameter value during run-time when the crop is established from parameter values set in the relevent SCRUMcrop and SCRUMmanagement objects
        Constant SenescenceRate: FixedValue=0; Units=/d
        BiomassRemoval BiomassRemovalDefaults: HarvestFractionLiveToRemove=1; HarvestFractionDeadToRemove=1; HarvestFractionLiveToResidue=0; HarvestFractionDeadToResidue=0
        Constant DetachmentRateFunction: FixedValue=0; Units=/d
        Constant MaintenanceRespirationFunction: FixedValue=0; Units=0-1
        Constant DMConversionEfficiency: FixedValue=1; Units=0-1
        Constant NRetranslocationFactor: FixedValue=0
        Constant NitrogenDemandSwitch: FixedValue=1
        Constant DMReallocationFactor: FixedValue=0
        Constant DMRetranslocationFactor: FixedValue=0
        Constant CarbonConcentration: FixedValue=0.4
        NutrientDemandFunctions DMDemands
          MultiplyFunction Structural
            PartitionFractionDemandFunction DMDemandFunction
              SubtractFunction PartitionFraction
                Constant One: FixedValue=1
                VariableReference RootFraction: VariableName=[Root].RootProportion
                VariableReference StoverFraction
                  VariableName=[Stover].DMDemands.Structural.DMDemandFunction.PartitionFraction
            Constant StructuralFraction: FixedValue=1; Units=0-1
          Constant Metabolic: FixedValue=0
          Constant Storage: FixedValue=0
          Constant QStructuralPriority: FixedValue=1
          Constant QMetabolicPriority: FixedValue=1
          Constant QStoragePriority: FixedValue=1
        NutrientDemandFunctions NDemands
          MultiplyFunction Structural
            VariableReference MinNconc: VariableName=[Product].minimumNconc
            VariableReference PotentialDMAllocation: VariableName=[Product].potentialDMAllocation.Structural
            Constant off: FixedValue=0
          MultiplyFunction Metabolic
            SubtractFunction MetabolicNconc
              VariableReference CritNconc: VariableName=[Product].criticalNConc
              VariableReference MinNconc: VariableName=[Product].minimumNconc
            VariableReference PotentialDMAllocation: VariableName=[Product].potentialDMAllocation.Structural
            Constant off: FixedValue=0
          StorageNDemandFunction Storage
            VariableReference NitrogenDemandSwitch: VariableName=[Product].nitrogenDemandSwitch
            VariableReference MaxNconc: VariableName=[Product].MaximumNconc
          Constant QStructuralPriority: FixedValue=1
          Constant QMetabolicPriority: FixedValue=1
          Constant QStoragePriority: FixedValue=1
        RetranslocateNonStructural RetranslocateNitrogen
        NutrientPoolFunctions InitialWt
          Constant Structural: FixedValue=0; Units=g/m^2
          Constant Metabolic: FixedValue=0
          Constant Storage: FixedValue=0
        Constant Photosynthesis: FixedValue=0
        VariableReference initialNConcFunction: VariableName=[Product].MaximumNConc
      SimpleLeaf Stover: Albedo=0.18; Gsmax350=0.01; R50=150; LeafInitialisationStage=Emergence; Height=0; BaseHeight=0; Width=0; FRGR=0; PotentialEP=0; WaterDemand=0; KDead=0.1; LAIDead=0
        Memo Description
          Stover represents any part of the crop that is not removed at harvest (i.e not part of the product).
        Constant StomatalConductanceCO2Modifier: FixedValue=1
        Constant NReallocationFactor: FixedValue=0
        Constant RemobilisationCost: FixedValue=0
        Constant SenescenceRate: FixedValue=0
        Constant DetachmentRate: FixedValue=0; Units=/d
        Constant InitialWt: FixedValue=0; Units=g/m2
        MultiplyFunction Photosynthesis
          DeltaFunction UnStressedBiomass: StartStageName=Emergence
            SigmoidFunction Integral
              VariableReference Ymax: VariableName=[Scrum].TotalDMAtHarvest
              VariableReference XValue: VariableName=[Phenology].AccumulatedEmergedTT
              Constant Xo: FixedValue=0
                Memo Param value set at establishment
                  SCRUM calculates this parameter value during run-time when the crop is established from parameter values set in the relevent SCRUMcrop and SCRUMmanagement objects
              Constant b: FixedValue=0
                Memo Param value set at establishment
                  SCRUM calculates this parameter value during run-time when the crop is established from parameter values set in the relevent SCRUMcrop and SCRUMmanagement objects
          LinearInterpolationFunction WaterStressFactor
            XYPairs: X=[0, 1]; Y=[1, 1]
            VariableReference XValue: VariableName=[Stover].Fw
        MinimumFunction FRGR
          SubDailyInterpolation FRGRFunctionTemp: agregationMethod=0
            XYPairs Response: X=[0, 10, 25, 40]; Y=[0, 1, 1, 0]
            ThreeHourAirTemperature InterpolationMethod
        PhaseLookup LaiDead
          PhaseLookupValue Expanding: Start=Emergence; End=MidReproductive
            Constant: FixedValue=0
          PhaseLookupValue Senescence: Start=MidReproductive; End=Maturity
            MultiplyFunction SenescingLAI
              HoldFunction MaxLAI: WhenToHold=MidReproductive
                VariableReference ValueToHold: VariableName=[Stover].LAI
              SubtractFunction ProportionLost
                Constant One: FixedValue=1
              DivideFunction ProportionSenesced
                SubtractFunction TTSenesce
                  VariableReference AccumulatedThermalTime: VariableName=[Phenology].AccumulatedEmergedTT
                  AddFunction ThermalTimeAtStartSenescence
                    VariableReference Seedling: VariableName=[Phenology].Seedling.Target
                    VariableReference Vegetative: VariableName=[Phenology].Vegetative.Target
                    VariableReference EarlyReproductive: VariableName=[Phenology].EarlyReproductive.Target
                    VariableReference MidReproductive: VariableName=[Phenology].MidReproductive.Target
                AddFunction SenescentPhaseDuration
                  VariableReference LateReproductive: VariableName=[Phenology].LateReproductive.Target
                  VariableReference Maturity: VariableName=[Phenology].Maturity.Target
        PhaseLookup Cover
          PhaseLookupValue Expanding: Start=Emergence; End=MidReproductive
            SigmoidFunction SigCoverFunction
              Constant Ymax: FixedValue=0
                Memo Param value set at establishment
                  SCRUM calculates this parameter value during run-time when the crop is established from parameter values set in the relevent SCRUMcrop and SCRUMmanagement objects
              VariableReference XValue: VariableName=[Phenology].AccumulatedEmergedTT
              Constant Xo: FixedValue=0
                Memo Param value set at establishment
                  SCRUM calculates this parameter value during run-time when the crop is established from parameter values set in the relevent SCRUMcrop and SCRUMmanagement objects
              Constant b: FixedValue=0
                Memo Param value set at establishment
                  SCRUM calculates this parameter value during run-time when the crop is established from parameter values set in the relevent SCRUMcrop and SCRUMmanagement objects
          PhaseLookupValue Senescence: Start=MidReproductive; End=Maturity
            MultiplyFunction DecreasingCover
              HoldFunction MaxCover: WhenToHold=MidReproductive
                VariableReference ValueToHold: VariableName=[Stover].CoverGreen
              SubtractFunction ProportionLost
                Constant One: FixedValue=1
                DivideFunction ProportionRemaining: same as Replacements.SCRUM.Stover.LaiDead.Senescence.SenescingLAI.ProportionSenesced
        Constant ExtinctionCoefficient: FixedValue=0
          Memo Param value set at establishment
            SCRUM calculates this parameter value during run-time when the crop is established from parameter values set in the relevent SCRUMcrop and SCRUMmanagement objects
        SigmoidFunction HeightFunction: same as Replacements.SCRUM.Stover.Cover.Expanding.SigCoverFunction
        Constant MaxNConcAtMaturity: FixedValue=0
          Memo Param value set at establishment
            SCRUM calculates this parameter value during run-time when the crop is established from parameter values set in the relevent SCRUMcrop and SCRUMmanagement objects
        AddFunction MaximumNConc
          VariableReference MaxNConcAtMaturity: VariableName=[Stover].MaxNConcAtMaturity
          MultiplyFunction EarlyNConcElevation
            SubtractFunction
              VariableReference MaxNConcAtSeedling: VariableName=[SCRUM].MaxNConcAtSeedling
              VariableReference MaxNConcAtMaturity: VariableName=[Stover].MaxNConcAtMaturity
            LinearInterpolationFunction DilutionCurve
              XYPairs: X=[1, 3, 4, 5, 6, 7, 8]; Y=[1, 1, 0.1, 0.02, 0, 0, 0]
              VariableReference XValue: VariableName=[Phenology].Stage
        MultiplyFunction CriticalNConc
          VariableReference MaxNConcAtMaturity: VariableName=[Stover].MaxNConcAtMaturity
          Constant StructuralNFactor: FixedValue=0.6
        MultiplyFunction MinimumNConc
          VariableReference MaxNConcAtMaturity: VariableName=[Stover].MaxNConcAtMaturity
          Constant StructuralNFactor: FixedValue=0.6
        Constant NitrogenDemandSwitch: FixedValue=1
        SubtractFunction DMAtHarvest
          MultiplyFunction AboveGroundDMAtHarvest
            VariableReference ProductDM: VariableName=[Product].DryYield
            DivideFunction InvertedHI
              Constant One: FixedValue=1
              VariableReference HarvestIndex: VariableName=[Product].HarvestIndex
          VariableReference ProductDMAtHarvest: VariableName=[Product].DryYield
        BiomassRemoval BiomassRemovalDefaults: HarvestFractionLiveToRemove=0; HarvestFractionDeadToRemove=0; HarvestFractionLiveToResidue=1; HarvestFractionDeadToResidue=1
        Constant MaintenanceRespiration: FixedValue=0; Units=0-1
        Constant DMConversionEfficiency: FixedValue=1; Units=0-1
        Constant NRetranslocationFactor: FixedValue=0
        Constant DMReallocationFactor: FixedValue=0
        Constant DMRetranslocationFactor: FixedValue=0
        Constant CarbonConcentration: FixedValue=0.4
        NutrientDemandFunctions DMDemands
          MultiplyFunction Structural
            PartitionFractionDemandFunction DMDemandFunction
              Memo Description
                DM demand is based on a simple partitioning coefficients.  At harvest the biomass partitioned to the stover = TotalDM * (1 - RootProportion) * (1 - Harvest index).  However the partitioningFraction is more complicated that this as it partitions more biomass to the stover in the CanopyExpanding Phase and less in the Yield increasing phase to give realistic patterns of accumulation of biomass in the Stover and Product over the duration of the crop
              DivideFunction PartitionFraction
                VariableReference StoverDMAtHarvest: VariableName=[Stover].DMAtHarvest
                VariableReference TotalDMAtHarvest: VariableName=[Scrum].TotalDMAtHarvest
            Constant StructuralFraction: FixedValue=1; Units=0-1
          Constant Metabolic: FixedValue=0
          Constant Storage: FixedValue=0
          Constant QStructuralPriority: FixedValue=1
          Constant QMetabolicPriority: FixedValue=1
          Constant QStoragePriority: FixedValue=1
        NutrientDemandFunctions NDemands
          MultiplyFunction Structural
            VariableReference MinNconc: VariableName=[Stover].minimumNconc
            VariableReference PotentialDMAllocation: VariableName=[Stover].potentialDMAllocation.Structural
            Constant off: FixedValue=0
          MultiplyFunction Metabolic
            SubtractFunction MetabolicNconc
              VariableReference CritNconc: VariableName=[Stover].criticalNConc
              VariableReference MinNconc: VariableName=[Stover].minimumNconc
            VariableReference PotentialDMAllocation: VariableName=[Stover].potentialDMAllocation.Structural
            Constant off: FixedValue=0
          StorageNDemandFunction Storage
            VariableReference NitrogenDemandSwitch: VariableName=[Stover].nitrogenDemandSwitch
            VariableReference MaxNconc: VariableName=[Stover].MaximumNconc
          Constant QStructuralPriority: FixedValue=1
          Constant QMetabolicPriority: FixedValue=1
          Constant QStoragePriority: FixedValue=1
      Root: GrowthRespiration=0; MaintenanceRespiration=0
        RootShapeCylinder RootShape
        Memo Description
          The root organ demands and is partitioned N and DM and its depth increases through time to provide a water uptake supply
        Constant DMConversionEfficiency: FixedValue=1; Units=0-1
        Constant RemobilisationCost: FixedValue=0
        KLModiferVsDepthFunction KLModifier
          VariableReference LayerDepth: VariableName=[Physical].DepthMidPoints
          VariableReference MaximumRootDepth: VariableName=[Root].MaximumRootDepth
        Constant SoilWaterEffect: FixedValue=1
        Constant MaxDailyNUptake: FixedValue=12
        Constant SenescenceRate: FixedValue=0
        Constant MaximumNConc: FixedValue=0
          Memo Param value set at establishment
            SCRUM calculates this parameter value during run-time when the crop is established from parameter values set in the relevent SCRUMcrop and SCRUMmanagement objects
        VariableReference CriticalNConc: VariableName=[Root].MaximumNConc
        VariableReference MinimumNConc: VariableName=[Root].MaximumNConc
        Constant NitrogenDemandSwitch: FixedValue=1
        Constant MaximumRootDepth: FixedValue=0
          Memo Param value set at establishment
            SCRUM calculates this parameter value during run-time when the crop is established from parameter values set in the relevent SCRUMcrop and SCRUMmanagement objects
        MultiplyFunction RootFrontVelocity
          LessThanFunction RootFrontVelocity
            VariableReference TestVariable: VariableName=[Phenology].AccumulatedEmergedTT
            AddFunction GrowthDuration
              VariableReference Emerging: VariableName=[Phenology].Emerging.Target
              VariableReference Seedling: VariableName=[Phenology].Seedling.Target
              VariableReference Vegetative: VariableName=[Phenology].Vegetative.Target
              VariableReference EarlyReproductive: VariableName=[Phenology].EarlyReproductive.Target
            DivideFunction IfTrue
              VariableReference MaxRootDepth: VariableName=[Root].MaximumRootDepth
              VariableReference GrowthDuration: VariableName=[Root].RootFrontVelocity.RootFrontVelocity.GrowthDuration
            Constant IfFalse: FixedValue=0
          VariableReference ThermalTime: VariableName=[Phenology].ThermalTime
        Constant RootProportion: FixedValue=0.1
          Memo Param value set at establishment
            SCRUM calculates this parameter value during run-time when the crop is established from parameter values set in the relevent SCRUMcrop and SCRUMmanagement objects
        BiomassRemoval BiomassRemovalDefaults: HarvestFractionLiveToRemove=0; HarvestFractionDeadToRemove=0; HarvestFractionLiveToResidue=1; HarvestFractionDeadToResidue=1
        Constant SpecificRootLength: FixedValue=40; Units=m/g
        LinearInterpolationFunction KNO3
          XYPairs: X=[0, 0.003]; Y=[0.02, 0.02]
          VariableReference XValue: VariableName=[Root].LengthDensity
        LinearInterpolationFunction KNH4
          XYPairs: X=[0, 0.003]; Y=[0, 0]
          VariableReference XValue: VariableName=[Root].LengthDensity
        LinearInterpolationFunction NUptakeSWFactor
          XYPairs: X=[0, 1]; Y=[0, 1]
          VariableReference XValue: VariableName=[Root].RWC
        Constant MaintenanceRespirationFunction: FixedValue=0
        Constant CarbonConcentration: FixedValue=0.4
        NutrientDemandFunctions DMDemands
          MultiplyFunction Structural
            PartitionFractionDemandFunction DMDemandFunction
              VariableReference PartitionFraction: VariableName=[Root].RootProportion
            Constant StructuralFraction: FixedValue=1
          Constant Metabolic: FixedValue=0
          Constant Storage: FixedValue=0
          Constant QStructuralPriority: FixedValue=1
          Constant QMetabolicPriority: FixedValue=1
          Constant QStoragePriority: FixedValue=1
        NutrientDemandFunctions NDemands
          MultiplyFunction Structural
            VariableReference MinNconc: VariableName=[Root].minimumNconc
            VariableReference PotentialDMAllocation: VariableName=[Root].potentialDMAllocation.Structural
          Constant Metabolic: FixedValue=0
          Constant Storage: FixedValue=0
          Constant QStructuralPriority: FixedValue=1
          Constant QMetabolicPriority: FixedValue=1
          Constant QStoragePriority: FixedValue=1
        NutrientPoolFunctions InitialWt
          Constant Structural: FixedValue=0; Units=g/m2
          Constant Metabolic: FixedValue=0
          Constant Storage: FixedValue=0
      Nodule
        Memo Description
          The nodule organ is unparameterised and simply has a switch that is turned on for legume crops (so they can fix what ever N the crop demands) and switched off for non legume crops (which fix no N)
        Constant MaximumNConc: FixedValue=0
        Constant CriticalNConc: FixedValue=0
        Constant MinimumNConc: FixedValue=0
        Constant RemobilisationCost: FixedValue=0
        Constant NReallocationFactor: FixedValue=0
        Constant SenescenceRate: FixedValue=0
        Constant FixationRate: FixedValue=0
          Memo Param value set at establishment
            SCRUM calculates this parameter value during run-time when the crop is established from parameter values set in the relevent SCRUMcrop and SCRUMmanagement objects
        BiomassRemoval BiomassRemovalDefaults: HarvestFractionLiveToRemove=0; HarvestFractionDeadToRemove=0; HarvestFractionLiveToResidue=0; HarvestFractionDeadToResidue=0
        Constant InitialWtFunction: FixedValue=0; Units=g/m^2
        Constant DetachmentRateFunction: FixedValue=0; Units=/d
        Constant FixationMetabolicCost: FixedValue=0
        Constant MaintenanceRespirationFunction: FixedValue=0; Units=0-1
        Constant DMConversionEfficiency: FixedValue=1; Units=0-1
        Constant NRetranslocationFactor: FixedValue=0
        Constant NitrogenDemandSwitch: FixedValue=0
        Constant DMReallocationFactor: FixedValue=0
        Constant DMRetranslocationFactor: FixedValue=0
        Constant CarbonConcentration: FixedValue=0.4
        NutrientPoolFunctions DMDemands
          Constant Structural: FixedValue=0
          Constant Metabolic: FixedValue=0
          Constant Storage: FixedValue=0
        NutrientPoolFunctions NDemands: same as Replacements.SCRUM.Nodule.DMDemands
      CompositeBiomass Total: OrganNames=[Stover, Product, Root]; IncludeLive=true; IncludeDead=true
      CompositeBiomass AboveGround: OrganNames=[Stover, Product]; IncludeLive=true; IncludeDead=true
        Memo
          The AboveGround composite biomass object includes Stover and Product organs.
      Constant MortalityRate: FixedValue=0
      Constant SeedMortalityRate: FixedValue=0
      MultiplyFunction TotalDMAtHarvest
        VariableReference ProductDryYield: VariableName=[Product].DryYield
        DivideFunction InvertedHI
          Constant One: FixedValue=1
          VariableReference HarvestIndex: VariableName=[Product].HarvestIndex
        DivideFunction InvertedAboveGroundPropn
          Constant One: FixedValue=1
          SubtractFunction AboveGroundFunction
            Constant One: FixedValue=1
            VariableReference RootPropn: VariableName=[Root].RootProportion
        Constant InvertedRelativeMaturityAtHarvest: FixedValue=0
          Memo Param value set at establishment
            SCRUM calculates this parameter value during run-time when the crop is established from parameter values set in the relevent SCRUMcrop and SCRUMmanagement objects
      Constant MaxNConcAtSeedling: FixedValue=0.04
        Memo Param value set at establishment
          SCRUM calculates this parameter value during run-time when the crop is established from parameter values set in the relevent SCRUMcrop and SCRUMmanagement objects
      ScrumCrop Cereal: HarvestIndex=0.45; MoisturePc=14; Proot=0.1; MaxRD=1005; MaxHeight=700; Acover=0.97; ExtinctCoeff=0.55; RootNConc=0.01; StoverNConc=0.01; ProductNConc=0.015; SeedlingNConc=0.05; BaseT=0; OptT=30; MaxT=40; Legume=false; WaterStress=false
      ScrumCrop Legume: HarvestIndex=0.5; MoisturePc=12; Proot=0.1; MaxRD=600; MaxHeight=500; Acover=0.97; ExtinctCoeff=0.85; RootNConc=0.01; StoverNConc=0.03; ProductNConc=0.025; SeedlingNConc=0.06; BaseT=0; OptT=30; MaxT=40; Legume=true; WaterStress=false
      ScrumCrop Maize: HarvestIndex=0.5; MoisturePc=14; Proot=0.1; MaxRD=2000; MaxHeight=1800; Acover=0.97; ExtinctCoeff=0.55; RootNConc=0.005; StoverNConc=0.009; ProductNConc=0.012; SeedlingNConc=0.03; BaseT=10; OptT=30; MaxT=40; Legume=false; WaterStress=true
      ScrumCrop Potato: HarvestIndex=0.9; MoisturePc=79; Proot=0.1; MaxRD=600; MaxHeight=600; Acover=0.97; ExtinctCoeff=0.8; RootNConc=0.01; StoverNConc=0.012; ProductNConc=0.025; SeedlingNConc=0.05; BaseT=0; OptT=30; MaxT=40; Legume=false; WaterStress=true
      ScrumCrop Pea: HarvestIndex=0.4; MoisturePc=14; Proot=0.1; MaxRD=700; MaxHeight=500; Acover=0.97; ExtinctCoeff=0.8; RootNConc=0.01; StoverNConc=0.02; ProductNConc=0.03; SeedlingNConc=0.06; BaseT=5; OptT=30; MaxT=40; Legume=true; WaterStress=true
      ScrumCrop Wheat: HarvestIndex=0.55; MoisturePc=14; Proot=0.1; MaxRD=1500; MaxHeight=800; Acover=0.97; ExtinctCoeff=0.55; RootNConc=0.01; StoverNConc=0.005; ProductNConc=0.025; SeedlingNConc=0.05; BaseT=9; OptT=30; MaxT=40; Legume=false; WaterStress=true
      ScrumCrop WheatFARAblock: HarvestIndex=0.1; MoisturePc=14; Proot=0.1; MaxRD=1500; MaxHeight=800; Acover=0.97; ExtinctCoeff=0.55; RootNConc=0.01; StoverNConc=0.0001; ProductNConc=0.035; SeedlingNConc=0.005; BaseT=0; OptT=30; MaxT=40; Legume=false; WaterStress=true
      ScrumCrop WheatChertsey2022: HarvestIndex=0.5; MoisturePc=14; Proot=0.1; MaxRD=1500; MaxHeight=800; Acover=0.97; ExtinctCoeff=0.55; RootNConc=0.01; StoverNConc=0.005; ProductNConc=0.019; SeedlingNConc=0.005; BaseT=0; OptT=30; MaxT=40; Legume=false; WaterStress=true
      ScrumCrop WheatChertsey2023: HarvestIndex=0.45; MoisturePc=14; Proot=0.1; MaxRD=1500; MaxHeight=800; Acover=0.97; ExtinctCoeff=0.55; RootNConc=0.01; StoverNConc=0.006; ProductNConc=0.017; SeedlingNConc=0.005; BaseT=0; OptT=30; MaxT=40; Legume=false; WaterStress=true
      ScrumCrop Pryegrass: HarvestIndex=0.16; MoisturePc=14; Proot=0.1; MaxRD=1500; MaxHeight=800; Acover=0.97; ExtinctCoeff=0.55; RootNConc=0.01; StoverNConc=0.015; ProductNConc=0.017; SeedlingNConc=0.05; BaseT=0; OptT=30; MaxT=40; Legume=false; WaterStress=true
  Simulation SCRUMSownFromManager
    Weather: FileName=%root%\Tests\WeatherFiles\lincoln.met
    Clock: Start=1998-10-14; End=1999-03-01
    Summary
    SoilArbitrator Soil Arbitrator
    Zone Field: Area=1; Slope=0; AspectAngle=0; Altitude=50
      Soil: Latitude=0; Longitude=0
        Chemical: Thickness=[100, 200, 300, 300, 300, 300]; PH=[6.6, 6.2, 5.7, 5.5, 5.5, 5.5]; PHUnits=Water
        Water: Thickness=[100, 200, 300, 300, 300, 300]; InitialValues=[0.33, 0.33, 0.31, 0.15, 0.1, 0.06]; InitialPAWmm=180; RelativeTo=LL15; FilledFromTop=false
        Physical
          Thickness  BD   AirDry  LL15  DUL   SAT
          100        1.2  0.08    0.13  0.33  0.5
          200        1.2  0.13    0.13  0.33  0.5
          300        1.2  0.1     0.1   0.31  0.44
          300        1.2  0.06    0.06  0.15  0.46
          300        1.2  0.04    0.04  0.1   0.44
          300        1.2  0.02    0.02  0.06  0.44
          SoilCrop SCRUMSoil: LL=[0.13, 0.13, 0.1, 0.08, 0.11, 0.11]; KL=[0.1, 0.1, 0.1, 0.1, 0.1, 0.1]; XF=[1, 1, 1, 1, 1, 1]
          SoilCrop PotatoSoil: LL=[0.13, 0.13, 0.27, 0.27, 0.3, 0.3]; KL=[0.1, 0.06, 0.03, 0.01, 0, 0]; XF=[1, 1, 0.1, 0, 0, 0]
        WaterBalance SoilWater: SummerDate=1-Nov; SummerU=9; SummerCona=4.4; WinterDate=1-Apr; WinterU=9; WinterCona=4.4; DiffusConst=88; DiffusSlope=35.4; Salb=0.18; CN2Bare=68; CNRed=20; CNCov=0.8; DischargeWidth=0; CatchmentArea=0; PSIDul=-100
          Thickness  SWCON  KLAT
          100        0.55   0
          200        0.55   0
          300        0.55   0
          300        0.55   0
          300        0.55   0
          300        0.55   0
        Nutrient
        Organic: FOMCNRatio=30; CarbonUnits=Total
          Thickness  Carbon  SoilCNRatio  FBiom  FInert  FOM
          100        1.82    11.5         0.025  0.3     1243.93
          200        1.47    11.5         0.025  0.4     833.832
          300        1.2     11.5         0.015  0.75    457.617
          300        1.03    11.5         0.01   0.9     251.145
          300        0.47    11.5         0.01   0.96    137.831
          300        0.47    11.5         0.01   0.96    75.6435
        LayerStructure
          Thickness=[100, 100, 100, 100, 100, 100, 100, 100, 100, 100, 100, 100, 100, 100, 100]
        CERESSoilTemperature Temperature
        Solute NO3: Thickness=[100, 200, 300, 300, 300, 300]; InitialValues=[225, 12.5, 1.38889, 1.38889, 0, 0]; InitialValuesUnits=ppm; WaterTableConcentration=0; D0=0; DepthConstant=0; MaxDepthSoluteAccessible=0; RunoffEffectivenessAtMovingSolute=0; MaxEffectiveRunoff=0
        Solute NH4: Thickness=[100, 200, 300, 300, 300, 300]; InitialValues=[0, 0, 0, 0, 0, 0]; InitialValuesUnits=ppm; WaterTableConcentration=0; D0=0; DepthConstant=0; MaxDepthSoluteAccessible=0; RunoffEffectivenessAtMovingSolute=0; MaxEffectiveRunoff=0
        Solute Urea: Thickness=[100, 200, 300, 300, 300, 300]; InitialValues=[0, 0, 0, 0, 0, 0]; InitialValuesUnits=kg/ha; WaterTableConcentration=0; D0=0; DepthConstant=0; MaxDepthSoluteAccessible=0; RunoffEffectivenessAtMovingSolute=0; MaxEffectiveRunoff=0
      SurfaceOrganicMatter surface organic matter: InitialResidueName=wheat; InitialResidueType=wheat; InitialResidueMass=2000; InitialStandingFraction=0; InitialCPR=0; InitialCNR=80
      MicroClimate: a_interception=0; b_interception=1; c_interception=0; d_interception=0; SoilHeatFluxFraction=0.4; MinimumHeightDiffForNewLayer=0; NightInterceptionFraction=0.5; ReferenceHeight=2
      Manager Sow Cereal on a fixed date
        CropName = Cereal
        EstablishDate = 10/14/1998 00:00:00
        EstablishStage = Seed
        PlantingDepth = 15
        HarvestDate = 01/01/0001 00:00:00
        HarvestTT = 1000
        HarvestStage = Ripe
        PotentialYield = 8
        FieldLoss = 0
        ResidueRemoval = 0
```csharp
using APSIM.Shared.Utilities;
using Models.Utilities;
using Models.Soils;
using Models.PMF;
using Models.Core;
using System;
using System.Linq;
using Models.PMF.SimplePlantModels;

namespace Models
{
    [Serializable]
    public class Script : Model
    {
        [Link] Clock clock;
        [Link] Zone zone;
        /// <summary>The plant</summary>
        [Link(Type = LinkType.Scoped, ByName = true)]
        public Plant scrum = null;
        
        [Separator("Choose one of your specified scrum crops to plant")]
        
        /// <summary>Establishemnt Date</summary>
        [Description("Crop to plant")]
        [Display(Type = DisplayType.SCRUMcropName)]
        public string CropName { get; set; }

        /// <summary>Establishemnt Date</summary>
        [Description("Establishment Date")]
        public DateTime EstablishDate { get; set; }
       
        /// <summary>Stages that Scrum crops may be established at</summary>
        [Description("Establishment Stage")]
        [Display(Type = DisplayType.ScrumEstablishStages)]
        public string EstablishStage {get; set;}
        
        /// <summary>Planting depth (mm)</summary>
        [Description("Planting depth (mm)")]
        public double PlantingDepth { get; set; }

        [Separator("Scrum needs to have a valid harvest date or Harvest Tt (from establishment) specified")]
        
        /// <summary>Harvest Date</summary>
        [Description("Harvest Date")]
        public DateTime HarvestDate { get; set; }

        /// <summary>Harvest Tt (if blank or zero must specify harvest date)</summary>
        [Description("Harvest Tt (oCd)")]
        public double HarvestTT { get; set; }
        
        /// <summary>Stage that Scrum crop is harvested at</summary>
        [Description("Harvest Stage")]
        [Display(Type = DisplayType.ScrumHarvestStages)]
        public string HarvestStage {get; set;}

        [Separator("Specify an appropriate potential yeild for the location, sowing date and assumed genotype \nScrum will reduce yield below potential if water or N stress are predicted")]
        
        /// <summary>Expected Yield (g FW/m2)</summary>
        [Description("Potential Yield (t/Ha)")]
        public double PotentialYield {get; set;}
        
        [Separator("Specify proportions of field loss and residue removal at harvest")]
        
        /// <summary>Field loss (i.e the proportion of expected yield that is left in the field 
        /// because of diseaese, poor quality or lack of market)</summary>
        [Description("Field loss (%)")]
        public double FieldLoss { get; set; }

        /// <summary>Residue Removal (i.e the proportion of residues that are removed from the field 
        /// by bailing or some other means)</summary>
        [Description("Residue removal (%)")]
        public double ResidueRemoval { get; set; }
        

        
        private ScrumManagement management {get; set;}
        
        [EventSubscribe("DoManagement")]
        private void OnDoManagement(object sender, EventArgs e)
        {
            if (clock.Today == EstablishDate)
            {
                management = new ScrumManagement(CropName,EstablishDate,EstablishStage,PlantingDepth,HarvestStage,PotentialYield,
                HarvestDate, HarvestTT, FieldLoss, ResidueRemoval);
                ScrumCrop currentCrop = zone.FindDescendant<ScrumCrop>(CropName);
                currentCrop.Establish(management);  
            }
        }
    }
}
```
      Plant SCRUM
        ScrumCrop Cereal: HarvestIndex=0.45; MoisturePc=14; Proot=0.1; MaxRD=1005; MaxHeight=700; Acover=0.97; ExtinctCoeff=0.55; RootNConc=0.01; StoverNConc=0.01; ProductNConc=0.015; SeedlingNConc=0; BaseT=0; OptT=30; MaxT=40; Legume=false; WaterStress=false
        ScrumCrop Legume: HarvestIndex=0.5; MoisturePc=12; Proot=0.1; MaxRD=600; MaxHeight=500; Acover=0.97; ExtinctCoeff=0.85; RootNConc=0.01; StoverNConc=0.03; ProductNConc=0.025; SeedlingNConc=0; BaseT=0; OptT=30; MaxT=40; Legume=true; WaterStress=false
        ScrumCrop Bolix: Legume=false; WaterStress=false
          zero: HarvestIndex, MoisturePc, Proot, MaxRD, MaxHeight, Acover, ExtinctCoeff, RootNConc, StoverNConc, ProductNConc, SeedlingNConc, BaseT, OptT, MaxT
      Irrigation
      Fertiliser
      Manager AutomaticIrrigation
        Irrigate = True
        Season_Start = 1-Sep
        Season_End = 30-Apr
        Season_Allocation = 1000
        Refull_Frac = 0.95
        Trigger_Frac = 0.8
        Return_days = 3
        Maximum_Irrigation_Amount = 40
        Top_Depth = 600
```csharp
using Newtonsoft.Json;
using Models.PMF.Phen;
using APSIM.Shared.Utilities;
using System.Xml.Serialization;
using Models.Soils;
using Models.PMF;
using Models.Core;
using System;
using Models.PMF.Organs;
using Models.Interfaces;

        
namespace Models
{
    [Serializable] 
    [System.Xml.Serialization.XmlInclude(typeof(Model))]
    public class Script : Model
    {
        [Link] private ISummary summary;
        [Link] private Irrigation Irrigation;
        [Link] private Clock Clock;
        [Link] private Soil Soil;
        [Link] private Plant SCRUM;
        [Link(Type = LinkType.Path, Path = "[SCRUM].Root")]
        private Root root;
        [Link(Type = LinkType.Path, Path = "[SCRUM].Phenology")]
        private Phenology phenology;
        [Link]
        private IPhysical soilPhysical;
        [Link]
        private ISoilWater waterBalance;
        //Communication to other modules
       
        //User inputs from properties tab
        [Description("Irrigation on (yes or no)")]
        public bool Irrigate { get; set; }
        [Description("SeasonStart (dd-MMM)")]
        public string Season_Start { get; set; }
        [Description("SeasonEnd (dd-MMM)")]
        public string Season_End { get; set; }
        [Description("Season Allocation (mm)")]
        public double Season_Allocation { get; set; }
        [Description("% PAWC to refill soil to (0-1)")]
        public double Refull_Frac { get; set; }
        [Description("% PAWC to trigger irrigation (0-1)")]
        public double Trigger_Frac { get; set; }
        [Description("Minimum days for irrigation to return")]
        public double Return_days { get; set; }
        [Description("Maximum irrigation application (mm)")]
        public double Maximum_Irrigation_Amount { get; set; }
        [Description("Depth to calculate PAWC (mm)")]
        public double Top_Depth { get; set; }
       
        //Class members
        [JsonIgnore] private bool IrrigationIsAvailable { get; set; }
        [JsonIgnore] public bool SeasonIsOpen { get; set; }
        [JsonIgnore] private bool CropIsActive { get; set; }
        [JsonIgnore] private bool IrrigatorIsAvailable { get; set; }
        [JsonIgnore] private bool SoilIsDry { get; set; }
        [JsonIgnore] public double Top_DUL { get; set; }
        [JsonIgnore] public double Top_Refull { get; set; }
        [JsonIgnore] public double Top_Trigger { get; set; }
        [JsonIgnore] public double Top_LL { get; set; }
        [JsonIgnore] public double Top_SW { get; set; }
        [JsonIgnore] public double Accumulated_depth { get; set; }
        [JsonIgnore] public double Days_since_irrigation { get; set; }
        [JsonIgnore] public double Amount_to_apply { get; set; }
        [JsonIgnore] public double Season_Application { get; set; }
        
        //Variables for date logic testing
        [JsonIgnore] public string StartString { get; set; }
        [JsonIgnore] public string EndString { get; set; }
        [JsonIgnore] public DateTime StartDate { get; set; }
        [JsonIgnore] public DateTime EndDate { get; set; }
        [JsonIgnore] public int TodayYear { get; set; }
        [JsonIgnore] public int TodayMonth { get; set; }
        [JsonIgnore] public int StartMonth { get; set; }
        [JsonIgnore] public int EndMonth { get; set; }
        [JsonIgnore] public int TodayDay { get; set; }
        [JsonIgnore] public int StartDay { get; set; }
        [JsonIgnore] public int EndDay { get; set; }
       
    
        //Calculate static soil variables
        [EventSubscribe("StartOfSimulation")]
        private void OnStartOfSimulation(object sender, EventArgs e)
        {   
            //Calculated soil water variables
            Accumulated_depth = 0;
            for (int layer = 0; Accumulated_depth < Top_Depth; layer++)
            {
                Top_LL += soilPhysical.LL15mm[layer];
                Top_DUL += soilPhysical.DULmm[layer];
                Accumulated_depth += soilPhysical.Thickness[layer];
            }
            Top_Refull = Top_LL + (Top_DUL - Top_LL) * Refull_Frac;
        }
       
      
        //Determine daily requirement for irrigation
        [EventSubscribe("StartOfDay")]
        private void OnStartOfDay(object sender, EventArgs e)
        { 
            //Can we irrigate?
            IrrigationIsAvailable = false; 
            if (Irrigate)
                IrrigationIsAvailable = true; 
    
            //Are we Allowed to Irrigate?
            TodayYear = Clock.Today.Year;
            StartString = Season_Start + "-" + TodayYear.ToString();
            EndString = Season_End + "-" + TodayYear.ToString();
            StartDate = DateTime.Parse(StartString);
            EndDate = DateTime.Parse(EndString);
            TodayMonth = Clock.Today.Month;
            TodayDay = Clock.Today.Day;
            StartDay = StartDate.Day;
            StartMonth = StartDate.Month;
            EndDay = EndDate.Day;
            EndMonth = EndDate.Month;
          
            SeasonIsOpen = false;
            //if we are in the spring and after the start date then yes
            if ((Clock.Today.Month > 6) && (Clock.Today >= StartDate))
                SeasonIsOpen = true;
            //if we are in the autumn and before the end date then yes
            if ((Clock.Today.Month <= 6) && (Clock.Today <= EndDate))
                SeasonIsOpen = true;
          
            //Is there a crop in the ground that needs irrigation?
            //CropIsActive = false;
            //if ((phenology.Stage >= 3.0) && (phenology.Stage < 6.0))
            CropIsActive = true;
          
            //Is the irrigator available?
            IrrigatorIsAvailable = false;
            Days_since_irrigation += 1;
            if (Days_since_irrigation >= Return_days)
                IrrigatorIsAvailable = true;
          
            //Is the soil dry enough to require irrigation?
            SoilIsDry = false;
            double CurrentRootDepth = 0;
            double RootDepth = root.Depth;
            CurrentRootDepth = Math.Max(RootDepth, CurrentRootDepth);
          
            double RelativeRootDepth = Math.Min(1.0, CurrentRootDepth / Top_Depth);
            Top_Trigger = Math.Min(Top_Refull, Top_DUL - (Top_DUL - Top_LL) * RelativeRootDepth * (1 - Trigger_Frac)); 
          
            Accumulated_depth = 0;
            Top_SW = 0;
            for (int layer = 0; Accumulated_depth < Top_Depth; layer++)
            {
                Top_SW += waterBalance.SWmm[layer];
                Accumulated_depth += soilPhysical.Thickness[layer];
            }
            if (Top_SW <= Top_Trigger)
                SoilIsDry = true;
                
            //Lets bloody well irrigate then!!!!
            if ((IrrigationIsAvailable) && (SeasonIsOpen) && (CropIsActive) && (IrrigatorIsAvailable) && (SoilIsDry)) //The conditions are rife for irrigation
            {
                Amount_to_apply = Math.Min(Top_Refull - Top_SW, Maximum_Irrigation_Amount);
                Amount_to_apply = Math.Min(Amount_to_apply, Season_Allocation - Season_Application); 
                Amount_to_apply = Math.Max(Amount_to_apply, 0.0);
                Irrigation.Apply(Amount_to_apply);
                Days_since_irrigation = 0;
                Season_Application += Amount_to_apply;
                summary.WriteMessage(this, "Automatic Irrigation", MessageType.Diagnostic);
            
            }
        }
    }
}
```
      Manager AutomaticFertiliser
        Season_Start = 1-Aug
        Season_End = 30-Apr
        Season_Allocation = 1000
        TriggerN = 50
        NApplicationAmount = 25
        Return_days = 3
        Top_Depth = 300
        Fertilise = True
```csharp
using Newtonsoft.Json;
using Models.PMF.Phen;
using Models.Soils.Nutrients;
using Models.Interfaces;
using APSIM.Shared.Utilities;
using Models.PMF;
using System.Xml.Serialization;
using Models.Soils;
using Models.Core;
using System;
using Models.PMF.Organs;

        
namespace Models
{
    [Serializable] 
    [System.Xml.Serialization.XmlInclude(typeof(Model))]
    public class Script : Model
    {
        [Link] private ISummary summary;
        [Link] private Fertiliser Fertiliser;
        [Link] private Clock Clock;
        [Link] private Plant SCRUM;
        [Link(ByName = true)]
        private ISolute NO3;
        [Link] private Soils.Soil Soil;
        [Link(Type = LinkType.Path, Path = "[SCRUM].Root")]
        private Root root;
        [Link(Type = LinkType.Path, Path = "[SCRUM].Phenology")]
        private Phenology phenology;
        [Link]
        private IPhysical soilPhysical;
        //Communication to other modules
       
        //User inputs from properties tab
        [Description("Fertilise (tick for yes)")]
        public bool Fertilise { get; set; }
        [Description("SeasonStart (dd-MMM)")]
        public string Season_Start { get; set; }
        [Description("SeasonEnd (dd-MMM)")]
        public string Season_End { get; set; }
        [Description("Season Allocation (kg/ha)")]
        public double Season_Allocation { get; set; }
        [Description("Mineral N to maintain soil above (kg/ha)")]
        public double TriggerN { get; set; }
        [Description("Amount of N to apply (kg/ha)")]
        public double NApplicationAmount { get; set; }
        [Description("Minimum days for Fertiliser spreader to return")]
        public double Return_days { get; set; }
        [Description("Depth to calculate mineral N (mm)")]
        public double Top_Depth { get; set; }
       
        //Class members
        [JsonIgnore] private bool FertiliserIsAvailable { get; set; }
        [JsonIgnore] public bool SeasonIsOpen { get; set; }
        [JsonIgnore] private bool CropIsActive { get; set; }
        [JsonIgnore] private bool FertSpreaderIsAvailable { get; set; }
        [JsonIgnore] private bool SoilNIsLow { get; set; }
        [JsonIgnore] public double Top_SoilN { get; set; }
        [JsonIgnore] public double Accumulated_depth { get; set; }
        [JsonIgnore] public double Days_since_fertiliser { get; set; }
        [JsonIgnore] public double Season_Application { get; set; }
        
        //Variables for date logic testing
        [JsonIgnore] public string StartString { get; set; }
        [JsonIgnore] public string EndString { get; set; }
        [JsonIgnore] public DateTime StartDate { get; set; }
        [JsonIgnore] public DateTime EndDate { get; set; }
        [JsonIgnore] public int TodayYear { get; set; }
        [JsonIgnore] public int TodayMonth { get; set; }
        [JsonIgnore] public int StartMonth { get; set; }
        [JsonIgnore] public int EndMonth { get; set; }
        [JsonIgnore] public int TodayDay { get; set; }
        [JsonIgnore] public int StartDay { get; set; }
        [JsonIgnore] public int EndDay { get; set; }
              
        //Determine daily requirement for fertiliser
        [EventSubscribe("StartOfDay")]
        private void OnStartOfDay(object sender, EventArgs e)
        { 
            //Can we irrigate?
            FertiliserIsAvailable = false; 
            if (Fertilise)
                FertiliserIsAvailable = true; 
    
            //Are we Allowed to Irrigate?
            TodayYear = Clock.Today.Year;
            StartString = Season_Start + "-" + TodayYear.ToString();
            EndString = Season_End + "-" + TodayYear.ToString();
            StartDate = DateTime.Parse(StartString);
            EndDate = DateTime.Parse(EndString);
            TodayMonth = Clock.Today.Month;
            TodayDay = Clock.Today.Day;
            StartDay = StartDate.Day;
            StartMonth = StartDate.Month;
            EndDay = EndDate.Day;
            EndMonth = EndDate.Month;
          
            SeasonIsOpen = false;
            //if we are in the spring and after the start date then yes
            if ((Clock.Today.Month > 6) && (Clock.Today >= StartDate))
                SeasonIsOpen = true;
            //if we are in the autumn and before the end date then yes
            if ((Clock.Today.Month <= 6) && (Clock.Today <= EndDate))
                SeasonIsOpen = true;
          
            //Is there a crop in the ground that needs irrigation?
            //CropIsActive = false;
            //if ((phenology.Stage >= 3.0) && (phenology.Stage < 6.0))
            CropIsActive = true;
          
            //Is the irrigator available?
            FertSpreaderIsAvailable = false;
            Days_since_fertiliser += 1;
            if (Days_since_fertiliser >= Return_days)
                FertSpreaderIsAvailable = true;
          
            //Is the soil N low enough to require fertiliser?
            SoilNIsLow = false;
            double CurrentRootDepth = 0;
            double RootDepth = root.Depth;
            CurrentRootDepth = Math.Max(RootDepth, CurrentRootDepth);
          
            Accumulated_depth = 0;
            Top_SoilN = 0;
            for (int layer = 0; Accumulated_depth < Top_Depth; layer++)
            {
                Top_SoilN += NO3.kgha[layer];
                Accumulated_depth += soilPhysical.Thickness[layer];
            }
            if (Top_SoilN <= TriggerN)
                SoilNIsLow = true;
                
            //Lets bloody well irrigate then!!!!
            if ((FertiliserIsAvailable) && (SeasonIsOpen) && (CropIsActive) && (FertSpreaderIsAvailable) && (SoilNIsLow)) //The conditions are rife for irrigation
            {
                Fertiliser.Apply(NApplicationAmount, Fertiliser.Types.UreaN, 10);
                Days_since_fertiliser = 0;
                Season_Application += NApplicationAmount;
                summary.WriteMessage(this, "Automatic Fertiliser", MessageType.Diagnostic);
            
            }
        }
    }
}
```
      Report: EventNames=[Clock].DoReport
        VariableNames:
          [Clock].Today
          [Soil].SoilWater.Drainage
          [Soil].SoilWater.Runoff
          [Soil].SoilWater.Eo
          [Soil].SoilWater.Es
          [Soil].SoilWater.pond
          [Soil].Water.MM
          [Soil].NO3.kgha
          [SCRUM].Stover.Live.Wt
          [SCRUM].Root.Live.Wt
          [SCRUM].Product.Live.Wt
          [SCRUM].Stover.Live.N
          [SCRUM].Root.Live.N
          [SCRUM].Product.Live.N
          [SCRUM].Stover.Live.NConc
          [SCRUM].Root.Live.NConc
          [SCRUM].Product.Live.NConc
          [SCRUM].Root.WaterUptake
          [SCRUM].Stover.Transpiration
          [SCRUM].Stover.WaterDemand
          [SCRUM].Root.Depth
          [SCRUM].Stover.CoverTotal
          [SCRUM].Stover.CoverDead
          [SCRUM].Stover.CoverGreen
          [SCRUM].Stover.LAI
          [SCRUM].Stover.LAIDead
          [SCRUM].Stover.Height
          [SCRUM].Arbitrator.N.TotalPlantDemand
          [SCRUM].Arbitrator.N.TotalPlantSupply
          [SCRUM].Stover.Fw
          [SCRUM].Stover.Fn
          [SCRUM].Total.Wt
          [SCRUM].Total.N
          [SCRUM].Arbitrator.DM.TotalFixationSupply
          [SCRUM].Arbitrator.DM.TotalPlantDemand
          [SCRUM].Phenology.AccumulatedEmergedTT
          [SCRUM].Phenology.AccumulatedTT
          [SCRUM].Arbitrator.DM.SinkLimitation
          [SCRUM].Arbitrator.DM.NutrientLimitation
          [SCRUM].Phenology.ThermalTime
          [SCRUM].Phenology.CurrentPhase.Name
          [SCRUM].Phenology.Stage
          [SCRUM].Phenology.CurrentStageName
          [AutomaticIrrigation].Script.Top_Refull
          [AutomaticIrrigation].Script.Top_Trigger
          [AutomaticIrrigation].Script.Top_SW
          [AutomaticIrrigation].Script.Top_DUL
          [Irrigation].IrrigationApplied
          [AutomaticIrrigation].Script.Amount_to_apply
          [AutomaticIrrigation].Script.StartDate
          [Clock].Today
          [AutomaticIrrigation].Script.SeasonIsOpen
          [AutomaticIrrigation].Script.EndDate
          [AutomaticIrrigation].Script.TodayYear
          [SCRUM].Arbitrator.FN
          [SCRUM].Arbitrator.N.TotalPlantSupply
          [SCRUM].Product.DMDemands.Structural.DMDemandFunction.PartitionFraction
          [SCRUM].Stover.DMDemands.Structural.DMDemandFunction.PartitionFraction
          [SCRUM].Root.DMDemands.Structural.DMDemandFunction.PartitionFraction
          [SCRUM].TotalDMAtHarvest
  Simulation SCRUMTestMultipleSowings
    Weather: FileName=%root%\Tests\WeatherFiles\lincoln.met
    Clock: Start=1998-10-14; End=2000-01-01
    Summary
    SoilArbitrator Soil Arbitrator
    Zone Field: Area=1; Slope=0; AspectAngle=0; Altitude=50
      Soil: Latitude=0; Longitude=0
        Chemical: Thickness=[100, 200, 300, 300, 300, 300]; PH=[6.6, 6.2, 5.7, 5.5, 5.5, 5.5]; PHUnits=Water
        Water: Thickness=[100, 200, 300, 300, 300, 300]; InitialValues=[0.33, 0.33, 0.31, 0.15, 0.1, 0.06]; InitialPAWmm=180; RelativeTo=LL15; FilledFromTop=false
        Physical: same as SCRUMSownFromManager.Field.Soil.Physical
        WaterBalance SoilWater: same as SCRUMSownFromManager.Field.Soil.SoilWater
        Nutrient
        Organic: same as SCRUMSownFromManager.Field.Soil.Organic
        LayerStructure
          Thickness=[100, 100, 100, 100, 100, 100, 100, 100, 100, 100, 100, 100, 100, 100, 100]
        CERESSoilTemperature Temperature
        Solute NO3: Thickness=[100, 200, 300, 300, 300, 300]; InitialValues=[225, 12.5, 1.389, 1.389, 0, 0]; InitialValuesUnits=ppm; WaterTableConcentration=0; D0=0; DepthConstant=0; MaxDepthSoluteAccessible=0; RunoffEffectivenessAtMovingSolute=0; MaxEffectiveRunoff=0
        Solute NH4: same as SCRUMSownFromManager.Field.Soil.NH4
        Solute Urea: same as SCRUMSownFromManager.Field.Soil.Urea
      SurfaceOrganicMatter surface organic matter: InitialResidueName=wheat; InitialResidueType=wheat; InitialResidueMass=2000; InitialStandingFraction=0; InitialCPR=0; InitialCNR=80
      MicroClimate: a_interception=0; b_interception=1; c_interception=0; d_interception=0; SoilHeatFluxFraction=0.4; MinimumHeightDiffForNewLayer=0; NightInterceptionFraction=0.5; ReferenceHeight=2
      Plant SCRUM
        ScrumCrop Cereal: HarvestIndex=0.45; MoisturePc=14; Proot=0.1; MaxRD=1005; MaxHeight=700; Acover=0.97; ExtinctCoeff=0.55; RootNConc=0.01; StoverNConc=0.01; ProductNConc=0.015; SeedlingNConc=0; BaseT=0; OptT=30; MaxT=40; Legume=false; WaterStress=false
        ScrumCrop Legume: HarvestIndex=0.5; MoisturePc=12; Proot=0.1; MaxRD=600; MaxHeight=500; Acover=0.97; ExtinctCoeff=0.85; RootNConc=0.01; StoverNConc=0.03; ProductNConc=0.025; SeedlingNConc=0; BaseT=0; OptT=30; MaxT=40; Legume=true; WaterStress=false
      ScrumManagement Sow Cereal Oct 98 harvest Apr 99: CropName=Cereal; EstablishDate=1998-10-14; EstablishStage=Seed; PlantingDepth=15; HarvestDate=1999-04-14; TtEstabToHarv=0; HarvestStage=Maturity; ExpectedYield=5.3; FieldLoss=0; ResidueRemoval=0
      ScrumManagement Sow Legume Jun 99 harvest after 600 oCd: CropName=Legume; EstablishDate=1999-06-01; EstablishStage=Seed; PlantingDepth=15; TtEstabToHarv=600; HarvestStage=LateReproductive; ExpectedYield=3.1; FieldLoss=10; ResidueRemoval=60
      Irrigation
      Fertiliser
      Manager AutomaticIrrigation: same as SCRUMSownFromManager.Field.AutomaticIrrigation
      Manager AutomaticFertiliser
        Fertilise = True
        Season_Start = 1-Aug
        Season_End = 30-Apr
        Season_Allocation = 1000
        TriggerN = 50
        NApplicationAmount = 25
        Return_days = 3
        Top_Depth = 300
        script: same as in SCRUMSownFromManager.Field.AutomaticFertiliser
      Report: same as SCRUMSownFromManager.Field.Report
  Experiment StageTest
    Factors
      Permutation
        Factor EstabAt
          Specification=[ScrumManagement].EstablishStage = Seed, Emergence, Seedling
        Factor HarvAt
          Specification=[ScrumManagement].HarvestStage = Vegetative, EarlyReproductive, MidReproductive, LateReproductive, Maturity, Ripe
    Simulation SCRUMTestBase2
      Weather: FileName=%root%\Tests\WeatherFiles\lincoln.met
      Clock: Start=1998-10-14; End=1999-07-01
      Summary
      SoilArbitrator Soil Arbitrator
      Zone Field: Area=1; Slope=0; AspectAngle=0; Altitude=50
        Soil: same as SCRUMSownFromManager.Field.Soil
        SurfaceOrganicMatter surface organic matter: InitialResidueName=wheat; InitialResidueType=wheat; InitialResidueMass=2000; InitialStandingFraction=0; InitialCPR=0; InitialCNR=80
        MicroClimate: a_interception=0; b_interception=1; c_interception=0; d_interception=0; SoilHeatFluxFraction=0.4; MinimumHeightDiffForNewLayer=0; NightInterceptionFraction=0.5; ReferenceHeight=2
        Plant SCRUM
        ScrumManagement: CropName=Cereal; EstablishDate=1998-10-14; EstablishStage=Seed; PlantingDepth=20; TtEstabToHarv=1000; HarvestStage=Maturity; ExpectedYield=5.3; FieldLoss=0; ResidueRemoval=0
        Irrigation
        Fertiliser
        Manager AutomaticIrrigation: same as SCRUMSownFromManager.Field.AutomaticIrrigation
        Manager AutomaticFertiliser: same as SCRUMSownFromManager.Field.AutomaticFertiliser
        Report: same as SCRUMSownFromManager.Field.Report
        Manager EndSim
```csharp
using System;
using Models.Core;
using Models.Interfaces;
using Models.PMF;
using APSIM.Shared.Utilities;
using Models.PMF.SimplePlantModels;

namespace Models
{
    [Serializable]
    public class Script : Model
    {
        [Link] IClock clock;
        [Link] ISummary Summary;
        [Link] private Simulation sim;
        [Link] private ScrumManagement sm;
        
        [EventSubscribe("DoManagement")]
        private void OnDoManagement(object sender, EventArgs e)
        {
            
            if (clock.Today == sm.HarvestDate)
            {
                sim.Set("Clock.EndDate", clock.Today.AddDays(1));
            }
        }
    }
}
```
  Experiment Lincoln2012
    Memo
      Testing of SCRUM under New Zealand conditions was undertaken using the data Maize data of Teixeira et al (2014).  This dataset includes the impact of three N (0 to 250 kg/ha N) and two water regimes (dryland and fully irrigated) using a rain-shelter structure.  Observations include biomass and nitrogen accumulation, soil water contents. Total biomass ranged from 8000 kg/ha for dryland nil N crops to up to 28000kg/ha for fully irrigated and N fertilised crops.  Dryland crops recovered 25 percent less N from applied fertilizer than irrigated crops.  The expected yields were set to 18 t/ha (the yield achieved in the fully irrigation Med N plots) for all treatments and the simple N and water responses of SCRUM were allowed to predict treatment effects.  The three graphs below show that SCRUM gave adequate estimations of biomass and N accumulations in respone to irrigation and fertiliser treatments and adequate estimations of soil water content.  This suggests Scum is suitable for its intended purpose of providing realistic N and water uptake patterns for N and water balance studies.
    Factors
      Permutation
        Factor Nit: Specification=[Fert]
          Operations Nil
            2012-11-15  [Fertiliser].Apply(0, Fertiliser.Types.UreaN, 10);
            2012-12-20  [Fertiliser].Apply(0, Fertiliser.Types.UreaN, 10);
            2013-01-31  [Fertiliser].Apply(0, Fertiliser.Types.UreaN, 10);
          Operations Low
            2012-11-15  [Fertiliser].Apply(25, Fertiliser.Types.UreaN, 10);
            2012-12-20  [Fertiliser].Apply(50, Fertiliser.Types.UreaN, 10);
          Operations Med
            2012-11-15  [Fertiliser].Apply(50, Fertiliser.Types.UreaN, 10);
            2012-12-20  [Fertiliser].Apply(100, Fertiliser.Types.UreaN, 10);
            2013-01-31  [Fertiliser].Apply(100, Fertiliser.Types.UreaN, 10);
        Factor Irr: Specification=[Irrig]
          Operations Full
            2012-10-24  [Irrigation].Apply(16);
            2012-10-26  [Irrigation].Apply(10);
            2012-11-03  [Irrigation].Apply(13);
            2012-11-11  [Irrigation].Apply(19.5);
            2012-11-15  [Irrigation].Apply(3.1);
            2012-11-23  [Irrigation].Apply(20);
            2012-11-29  [Irrigation].Apply(20);
            2012-11-30  [Irrigation].Apply(30);
            2012-12-13  [Irrigation].Apply(19);
            2012-12-20  [Irrigation].Apply(26);
            2012-12-20  [Irrigation].Apply(4);
            2012-12-27  [Irrigation].Apply(22);
            2013-01-03  [Irrigation].Apply(39.7);
            2013-01-10  [Irrigation].Apply(42.1);
            2013-01-17  [Irrigation].Apply(46.2);
            2013-01-24  [Irrigation].Apply(44.7);
            2013-01-31  [Irrigation].Apply(49.0);
            2013-02-07  [Irrigation].Apply(37);
            2013-02-14  [Irrigation].Apply(38);
            2013-02-21  [Irrigation].Apply(38);
            2013-02-28  [Irrigation].Apply(33.4);
            2013-03-07  [Irrigation].Apply(39.7);
            2013-03-14  [Irrigation].Apply(31.3);
            2013-03-21  [Irrigation].Apply(24);
            2013-03-28  [Irrigation].Apply(34);
            2013-04-04  [Irrigation].Apply(27.5);
          Operations Nil
            2012-10-24  [Irrigation].Apply(16);
            2012-10-26  [Irrigation].Apply(10);
            2012-11-03  [Irrigation].Apply(13);
            2012-11-11  [Irrigation].Apply(19.5);
            2012-11-15  [Irrigation].Apply(3.1);
            2012-11-23  [Irrigation].Apply(25);
            2012-11-29  [Irrigation].Apply(25);
            2012-12-20  [Irrigation].Apply(4);
            2013-01-31  [Irrigation].Apply(4.3);
    Simulation Lincoln2012
      Weather: FileName=%root%\Tests\Validation\Maize\lincoln.met
      Clock: Start=2012-10-01; End=2013-04-25
      Summary summaryfile
      SoilArbitrator Soil Arbitrator
      Zone RainShelter: Area=1; Slope=0; AspectAngle=0; Altitude=50
        Soil paparoa_silt_loam: SoilType=lignin_FOM; Region=Generic soil types; State=Canterbury; Latitude=999999; Longitude=999999
          DataSource=Profile descriptions provided by Trevor Webb and data for functional horizions based on SWAMP project results
          WaterBalance SoilWater: SummerDate=1-Nov; SummerU=9; SummerCona=4.4; WinterDate=1-Apr; WinterU=6; WinterCona=3; DiffusConst=88; DiffusSlope=35; Salb=0.13; CN2Bare=73; CNRed=20; CNCov=0.8; PSIDul=-100; Thickness=[200, 200, 200, 200, 200, 200, 200, 200]; SWCON=[0.5, 0.56, 0.31, 0.7, 0.7, 0.7, 0.7, 0.7]
          Nutrient
          Chemical: Thickness=[200, 200, 200, 300, 300, 300, 1000]; PH=[6, 6, 6, 6, 6, 6, 6]; PHUnits=Water
          Physical
            Thickness  BD     AirDry  LL15  DUL   SAT
            200        1.311  0.06    0.06  0.3   0.37
            200        1.474  0.05    0.12  0.3   0.37
            200        1.601  0.06    0.12  0.26  0.32
            200        1.68   0.05    0.13  0.24  0.3
            200        1.68   0.06    0.12  0.24  0.3
            200        1.68   0.05    0.15  0.21  0.3
            200        1.68   0.06    0.15  0.21  0.3
            200        1.68   0.05    0.15  0.21  0.3
            900        1.68   0.05    0.15  0.21  0.3
            SoilCrop SCRUMSoil: LL=[0.084, 0.12, 0.12, 0.15, 0.15, 0.06, 0.06, 0.06, -]; KL=[0.1, 0.1, 0.1, 0.1, 0.1, 0.1, 0.1, 0.1, -]; XF=[1, 1, 0.5, 1, 1, 1, 1, 1, -]
          Water: Thickness=[200, 200, 200, 300, 300, 300, 1000]; InitialValues=[0.06, 0.25, 0.2, 0.2, 0.2, 0.2, 0.2]; InitialPAWmm=147; RelativeTo=LL15; FilledFromTop=false
          Organic: FOMCNRatio=16; CarbonUnits=Total
            Thickness  Carbon  SoilCNRatio  FBiom  FInert  FOM
            200        3.6     11           0.03   0.3     1000
            200        2       11           0.02   0.4     500
            200        0.42    11           0.01   0.8     300
            300        0.23    11           0.01   0.9     100
            300        0.23    11           0.01   0.9     100
            300        0.23    11           0.01   0.9     100
          CERESSoilTemperature Temperature
          Solute NO3: Thickness=[200, 200, 200, 300, 300, 300, 1000]; InitialValues=[6.178, 3.65, 2.445, 1.359, 0.968, 0.345, 0]; InitialValuesUnits=ppm; WaterTableConcentration=0; D0=0; DepthConstant=0; MaxDepthSoluteAccessible=0; RunoffEffectivenessAtMovingSolute=0; MaxEffectiveRunoff=0
          Solute NH4: Thickness=[200, 200, 200, 300, 300, 300, 1000]; InitialValues=[0.343, 0.991, 0.178, 0.194, 0.167, 0.107, 0.107]; InitialValuesUnits=ppm; WaterTableConcentration=0; D0=0; DepthConstant=0; MaxDepthSoluteAccessible=0; RunoffEffectivenessAtMovingSolute=0; MaxEffectiveRunoff=0
          Solute Urea: Thickness=[200, 200, 200, 300, 300, 300, 1000]; InitialValues=[0, 0, 0, 0, 0, 0, 0]; InitialValuesUnits=kg/ha; WaterTableConcentration=0; D0=0; DepthConstant=0; MaxDepthSoluteAccessible=0; RunoffEffectivenessAtMovingSolute=0; MaxEffectiveRunoff=0
        Plant SCRUM
        ScrumManagement: CropName=Maize; EstablishDate=2012-10-23; EstablishStage=Seed; PlantingDepth=20; HarvestDate=2013-04-25; HarvestStage=Maturity; ExpectedYield=16; FieldLoss=0; ResidueRemoval=0
        MicroClimate: a_interception=0; b_interception=1; c_interception=0; d_interception=0; SoilHeatFluxFraction=0.4; MinimumHeightDiffForNewLayer=0; NightInterceptionFraction=0.5; ReferenceHeight=2
        Irrigation
        Fertiliser
        SurfaceOrganicMatter: InitialResidueName=wheat; InitialResidueType=wheat; InitialResidueMass=0; InitialStandingFraction=0; InitialCPR=0; InitialCNR=40
        Operations Irrig
          2012-10-24  [Irrigation].Apply(16);
          2012-10-26  [Irrigation].Apply(10);
          2012-11-03  [Irrigation].Apply(13);
          2012-11-11  [Irrigation].Apply(19.5);
          2012-11-15  [Irrigation].Apply(3.1);
          2012-11-23  [Irrigation].Apply(20);
          2012-11-29  [Irrigation].Apply(20);
          2012-11-30  [Irrigation].Apply(30);
          2012-12-13  [Irrigation].Apply(19);
          2012-12-20  [Irrigation].Apply(26);
          2012-12-20  [Irrigation].Apply(4);
          2012-12-27  [Irrigation].Apply(22);
          2013-01-03  [Irrigation].Apply(39.7);
          2013-01-10  [Irrigation].Apply(42.1);
          2013-01-17  [Irrigation].Apply(46.2);
          2013-01-24  [Irrigation].Apply(44.7);
          2013-01-31  [Irrigation].Apply(44.7);
          2013-01-31  [Irrigation].Apply(4.3);
          2013-02-07  [Irrigation].Apply(37);
          2013-02-14  [Irrigation].Apply(38);
          2013-02-21  [Irrigation].Apply(38);
          2013-02-28  [Irrigation].Apply(33.4);
          2013-03-07  [Irrigation].Apply(39.7);
          2013-03-14  [Irrigation].Apply(31.3);
          2013-03-21  [Irrigation].Apply(24);
          2013-03-28  [Irrigation].Apply(34);
          2013-04-04  [Irrigation].Apply(27.5);
        Operations Fert: same as Lincoln2012.Factors.Permutation.Nit.Med
        Manager ExtraVariables
```csharp
using Newtonsoft.Json;
using Models.PMF.Organs;
using Models.Soils.Nutrients;
using Models.Interfaces;
using System;
using Models.Core;
using System.Collections.Generic;
using System.Text;
using Models.Soils;
using Models.Soils.Nutrients;
using Models.PMF;
using Models;
using System.Xml.Serialization;
using APSIM.Shared.Utilities;
using Models.Climate;

namespace Models
{
    [Serializable] 
    public class Script : Model
    {
        [Link] private Clock Clock;
        [Link] private Weather Met;
        [Link] private Fertiliser Fert;
        [Link] private Irrigation Irrig;
        [Link] private Plant SCRUM;
        [Link] private Zone zone;
        [Link(ByName = true)]
        private ISolute Urea;
        [Link(ByName = true)]
        private ISolute NO3;
        [Link(ByName = true)]
        private ISolute NH4;
        [Link]
        private Nutrient SoilNitrogen;
        [Link] private Soils.Soil Soil;
        [Link] private Models.Surface.SurfaceOrganicMatter SOM;
        [Link(Type = LinkType.Path, Path = "[SCRUM].Root")]
        private Root root;
        [Link]
        private IPhysical soilPhysical;
        [Link]
        private ISoilWater waterBalance;
        [Link(Type=LinkType.Path, Path="[SurfaceOrganicMatter].SurfaceResidue.Decomposition")] private OrganicFlow ResidueDecomposition;
        [Link]
        private Nutrient Nutrient;
        
        [JsonIgnore] public bool InitialDay { get; set; }
        
        [JsonIgnore] public double AccumPlantN { get; set; }
        [JsonIgnore] public double AccumMineralisation { get; set; }
        [JsonIgnore] public double AccumDenit { get; set; }
        [JsonIgnore] public double AccumFert { get; set; }
        [JsonIgnore] public double AccumLeach { get; set; }
        [JsonIgnore] public double AccumDetach { get; set; }
        [JsonIgnore] public double DeltaSoilOMN { get; set; }
        [JsonIgnore] public double DeltaSurfaceOMN { get; set; }
        [JsonIgnore] public double DeltaSoilMineralN { get; set; }
        [JsonIgnore] public double SoilNitrogenContent { get; set; }
        
        [JsonIgnore] public double AccumEO { get; set; }
        [JsonIgnore] public double AccumEP { get; set; }
        [JsonIgnore] public double AccumES { get; set; }
        [JsonIgnore] public double AccumDrainage { get; set; }
        [JsonIgnore] public double AccumRunoff { get; set; }
        [JsonIgnore] public double AccumOutflowLat { get; set; }
        [JsonIgnore] public double AccumIrrigation { get; set; }
        [JsonIgnore] public double AccumRainfall { get; set; }
        [JsonIgnore] public double SoilWaterDeficit { get; set; }
    
        [JsonIgnore] public double  InitialSoilOMN { get; set; }
        [JsonIgnore] public double  InitialSurfaceOMN { get; set; }
        [JsonIgnore] public double  InitialMineralN { get; set; }
        
        [JsonIgnore] public double SWC { get; set; }
        [JsonIgnore] public double DUL { get; set; }
        [JsonIgnore] public double OutFlowLat { get; set; }

        [JsonIgnore] public double FomN { get; set; }
        [JsonIgnore] public double BiomN { get; set; }
        [JsonIgnore] public double HumN { get; set; }
        [JsonIgnore] public double OrganicN { get; set; }
        [JsonIgnore] public double NO3N { get; set; }
        [JsonIgnore] public double NH4N { get; set; }
        [JsonIgnore] public double UreaN { get; set; }
        [JsonIgnore] public double MineralN { get; set; }
        [JsonIgnore] public double DltNMinRes { get; set; }
        [JsonIgnore] public double DltNMinTot { get; set; }
        
        [JsonIgnore] public double StoverExpandedPosition { get; set; }
        [JsonIgnore] public double StoverAppearedPosition { get; set; }
        [JsonIgnore] public double ExpandedStoverNoYesterday { get; set; }
        [JsonIgnore] public double AppearedStoverNoYesterday { get; set; }
        [JsonIgnore] public double MostRecentlyExpandedStoverSize { get; set; }
        [JsonIgnore] public double MostRecentlyAppearedStoverMaxSize { get; set; }
        
        [EventSubscribe("StartOfSimulation")]
        private void OnSimulationCommencing(object sender, EventArgs e)
        {
            InitialDay = true;
            StoverExpandedPosition = 0;
            StoverAppearedPosition = 0;
            ExpandedStoverNoYesterday = 0;
            AppearedStoverNoYesterday = 0;
            MostRecentlyExpandedStoverSize = 0;
            MostRecentlyAppearedStoverMaxSize = 0;
        }
        
        [EventSubscribe("DoManagement")]
        private void OnDoManagement(object sender, EventArgs e)
        {
            //!!!!!! Nitrogen balance components !!!!!!
            //!!!!!!^^^^^^^^^^^^^^^^^^^^^^^^^^^^^!!!!!!
            FomN = MathUtilities.Sum(SoilNitrogen.FOM.N);
            HumN = MathUtilities.Sum(SoilNitrogen.Humic.N);
            BiomN = MathUtilities.Sum(SoilNitrogen.Microbial.N);
            OrganicN = FomN + HumN + BiomN;
            NO3N = MathUtilities.Sum(NO3.kgha);
            NH4N = MathUtilities.Sum(NH4.kgha);
            UreaN = MathUtilities.Sum(Urea.kgha);
            MineralN = NO3N + NH4N + UreaN; 
            DltNMinRes = MathUtilities.Sum(ResidueDecomposition.MineralisedN);
            DltNMinTot = MathUtilities.Sum(Nutrient.MineralisedN);
            int layers = soilPhysical.Thickness.Length;
            if (InitialDay == true)
            {
                InitialSurfaceOMN = SOM.N;
                InitialSoilOMN = OrganicN;
                InitialMineralN = MineralN;
                InitialDay = false;
            }
            AccumFert += Fert.NitrogenApplied;
            DeltaSurfaceOMN = SOM.N - InitialSurfaceOMN;
            AccumLeach = AccumLeach - waterBalance.LeachNH4 - waterBalance.LeachNO3 - waterBalance.LeachUrea; //Fails
            AccumMineralisation += MathUtilities.Sum(Nutrient.MineralisedN);
            AccumDenit -= MathUtilities.Sum(SoilNitrogen.DenitrifiedN);
            AccumPlantN -= (double)zone.Get("SCRUM.Root.NUptake");
            DeltaSoilOMN = OrganicN - InitialSoilOMN;
            DeltaSoilMineralN = MineralN - InitialMineralN;
            SoilNitrogenContent = MineralN;
            
            //!!!!!! Water balance components !!!!!!
            //!!!!!!^^^^^^^^^^^^^^^^^^^^^^^^^^!!!!!!

            AccumIrrigation += Irrig.IrrigationApplied;
            AccumRainfall += Met.Rain;
            //AccumEP -= (double)zone.Get("[SCRUM].Stover.Transpiration");
            AccumEP -= (double)zone.Get("SCRUM.Root.WaterUptake");
            SoilWaterDeficit = (SWC - DUL);
            double OutFlowLat = MathUtilities.Sum(waterBalance.LateralOutflow);
            AccumOutflowLat -= OutFlowLat;
            
        }
        
        [EventSubscribe("DoManagementCalculations")]
        private void OnDoManagementCalculations(object sender, EventArgs e)
        {
            FomN = MathUtilities.Sum(SoilNitrogen.FOM.N);
            HumN = MathUtilities.Sum(SoilNitrogen.Humic.N);
            BiomN = MathUtilities.Sum(SoilNitrogen.Microbial.N);
            
            
            AccumEO -= waterBalance.Eo;
            AccumES -= waterBalance.Es; 
            AccumDrainage -= waterBalance.Drainage;
            AccumRunoff -= waterBalance.Runoff;
            SWC = MathUtilities.Sum(waterBalance.SWmm);
            DUL = MathUtilities.Sum(soilPhysical.DULmm);
            
            
            
        }
    }
}
```
        Report: EventNames=[Clock].DoReport
          VariableNames:
            [Clock].Today
            [ExtraVariables].Script.AccumPlantN
            [ExtraVariables].Script.AccumMineralisation
            [ExtraVariables].Script.AccumDenit
            [ExtraVariables].Script.AccumFert
            [ExtraVariables].Script.AccumLeach
            [ExtraVariables].Script.AccumDetach
            [ExtraVariables].Script.DeltaSoilOMN
            [ExtraVariables].Script.DeltaSurfaceOMN
            [ExtraVariables].Script.DeltaSoilMineralN
            [ExtraVariables].Script.SWC
            [ExtraVariables].Script.DUL
            [ExtraVariables].Script.OutFlowLat
            [ExtraVariables].Script.AccumEO
            [ExtraVariables].Script.AccumEP
            [ExtraVariables].Script.AccumES
            [ExtraVariables].Script.AccumDrainage
            [ExtraVariables].Script.AccumRunoff
            [ExtraVariables].Script.AccumRainfall
            [ExtraVariables].Script.AccumIrrigation
            [ExtraVariables].Script.AccumOutflowLat
            [ExtraVariables].Script.SoilWaterDeficit
            [ExtraVariables].Script.SoilNitrogenContent
            [ExtraVariables].Script.FomN
            [ExtraVariables].Script.HumN
            [ExtraVariables].Script.BiomN
            [ExtraVariables].Script.DltNMinRes
            [ExtraVariables].Script.DltNMinTot
            [Soil].Water.Volumetric
            [Soil].SoilWater.Eo
            [Soil].SoilWater.Es
            [Soil].SoilWater.Drainage
            [Soil].SoilWater.Runoff
            sum([Soil].Water.MM[1:8]) as ProfileWater
            [Soil].NO3.kgha
            [SCRUM].Product.Live.Wt
            [SCRUM].Stover.Live.Wt
            [SCRUM].Root.Live.Wt
            [SCRUM].Product.Live.N
            [SCRUM].Stover.Live.N
            [SCRUM].Root.Live.N
            [SCRUM].Root.WaterUptake
            [SCRUM].Stover.Transpiration
            [SCRUM].Stover.WaterDemand
            [SCRUM].Root.Depth
            [SCRUM].Stover.CoverTotal
            [SCRUM].Stover.LAI
            [SCRUM].Stover.Height
            [SCRUM].Phenology.Stage
            [SCRUM].AboveGround.N
            [SCRUM].AboveGround.Wt
            [SCRUM].Total.N
            [SCRUM].Total.Wt
            [SCRUM].Arbitrator.N.TotalPlantDemand
            [SCRUM].Arbitrator.N.TotalPlantSupply
            [SCRUM].Arbitrator.DM.TotalFixationSupply
            [SCRUM].Arbitrator.DM.TotalPlantDemand
            [SCRUM].Arbitrator.DM.Allocated
            [SCRUM].Arbitrator.DM.SinkLimitation
            [SCRUM].Arbitrator.DM.NutrientLimitation
            [SCRUM].Stover.MaximumNConc
            [SCRUM].Stover.MinimumNConc
            [SCRUM].Stover.Live.NConc
            [SCRUM].Stover.Live.NConc
            [SCRUM].Product.Live.NConc
            [SCRUM].Stover.Fw
            [SCRUM].Arbitrator.FN
            [SCRUM].Phenology.CurrentStageName
        Manager ClimateControl
          StartDate = 10/23/2012 00:00:00
          EndDate = 04/10/2013 00:00:00
```csharp
using Models.Soils;
using System.Xml.Serialization;
using Models;
using Models.PMF;
using System.Text;
using System.Collections.Generic;
using APSIM.Shared.Utilities;
using Models.Core;
using System;
using Models.Climate;

namespace Models
{
    [Serializable] 
    [System.Xml.Serialization.XmlInclude(typeof(Model))]
    public class Script : Model
    {
        [Link] Weather Met;
        [Link] Clock Clock;
    
        [Description("Start Date")]
        public DateTime StartDate { get; set; }
        
        [Description("End Date")]
        public DateTime EndDate { get; set; }
 
    
        [EventSubscribe("PreparingNewWeatherData")]
        private void OnPreparingNewWeatherData(object sender, EventArgs e)
        {
            if ((Clock.Today.Date >= StartDate) && (Clock.Today.Date <= EndDate))
                Met.Rain = 0;        
        }
    }
}
```
  Experiment FARABlock
    Factors
      Permutation
        Factor N: Specification=[Fert]
          Operations Nil
          Operations High
            2017-10-25  [Fertiliser].Apply(100, [Fertiliser].Types.UreaN, 10);
            2017-11-09  [Fertiliser].Apply(100, [Fertiliser].Types.UreaN, 10);
        Factor Cultivar
          CompositeFactor G1: Specifications=[Sowing].Script.CropName = Wheat
          CompositeFactor G2: Specifications=[Sowing].Script.CropName = Wheat
          CompositeFactor G3: Specifications=[Sowing].Script.CropName = Wheat
          CompositeFactor G4: Specifications=[Sowing].Script.CropName = Wheat
          CompositeFactor G5: Specifications=[Sowing].Script.CropName = Wheat
          CompositeFactor G6: Specifications=[Sowing].Script.CropName = Wheat
    Simulation ABlock
      Weather: FileName=lincoln.met
      Clock: Start=2017-08-01; End=2018-02-02
      Summary
      SoilArbitrator Soil Arbitrator
      Zone Field: Area=1; Slope=0; AspectAngle=0; Altitude=50
        Soil: Region=Plains; State=Canterbury; Country=New Zealand; Latitude=0; Longitude=0
          DataSource=Generic profile descriptions provided by Trevor Webb and data for functional horizions based on SWAMP project results
          Comments=Bulk density values were measured on the fine earth fraction so values entered into apsim soil are adjusted down to account for stone content (assuming stones are inert from all soil process so their mass and volume is removed from model paramaters).  SAT, DUL, LL15 and Air dry have been adjusted down to account for stone content.  OC has not been adjusted so the model will get the correct carbon and N amounts using the adjusted BD.
          Physical
            Thickness  ParticleSizeClay  ParticleSizeSand  ParticleSizeSilt  Rocks  BD     AirDry  LL15  DUL    SAT    KS
            100        22                15                63                0      1.23   0.063   0.18  0.2    0.435  480
            100        22                15                63                0      1.235  0.065   0.18  0.22   0.43   420
            200        21.5              12.5              66                0      1.37   0.074   0.28  0.35   0.382  240
            200        20                15                65                0      1.52   0.06    0.25  0.34   0.4    240
            200        22.5              5                 72.5              0      1.5    0.01    0.15  0.33   0.4    1200
            200        8                 45                47                0      1.44   0.04    0.15  0.355  0.45   1200
            200        15                25                60                0      1.525  0.048   0.18  0.323  0.425  480
            200        5                 60                35                0      1.36   0.028   0.07  0.325  0.475  1200
            200        6                 50                44                0      1.35   0.032   0.08  0.3    0.46   1200
            200        6                 50                44                0      1.35   0.032   0.08  0.3    0.46   1140
            SoilCrop SCRUMSoil
              LL=[0.19, 0.19, 0.25, 0.28, 0.11, 0.18, 0.12, 0.07, 0.08, 0.08]
              KL=[0.8, 0.4, 0.2, 0.15, 0.4, 0.2, 0.2, 0.2, 0.2, 0]
              XF=[1, 1, 1, 1, 1, 1, 1, 1, 1, 1]
          WaterBalance SoilWater: SummerDate=1-oct; SummerU=9; SummerCona=4.4; WinterDate=1-Apr; WinterU=2; WinterCona=1.5; DiffusConst=88; DiffusSlope=35; Salb=0.13; CN2Bare=73; CNRed=20; CNCov=0.8; PSIDul=-100; Thickness=[100, 100, 200, 200, 200, 200, 200, 200, 200, 200]
            SWCON=[0.563, 0.56, 0.485, 0.44, 0.494, 0.545, 0.534, 0.508, 0.534, 0.533]
          Nutrient
          Organic: FOMCNRatio=25; CarbonUnits=Total
            Thickness  Carbon  SoilCNRatio  FBiom  FInert  FOM
            100        2.677   12           0.06   0.3     150
            100        2.784   12           0.046  0.3     150
            200        1.454   11.5         0.01   0.35    100
            200        0.383   10           0.008  0.65    100
            200        0.243   9.5          0.008  0.8     100
            200        0.243   9            0.008  0.85    10.5
            200        0.243   9            0.008  0.9     9
            200        0.243   9            0.008  0.99    3.3
            200        0.243   9            0.008  0.987   1.2
            200        0.243   9            0.008  0.988   0
          Water: Thickness=[100, 200, 300, 200, 100, 200, 100, 300]; InitialValues=[0.2, 0.285, 0.343, 0.33, 0.355, 0.339, 0.323, 0.317]; InitialPAWmm=216.6; RelativeTo=LL15; FilledFromTop=false
          Chemical: Thickness=[150, 150, 600, 300, 300]; PH=[6, 6, 6, 6, 6]; PHUnits=Water
          CERESSoilTemperature Temperature
          Solute NO3: Thickness=[150, 150, 600, 300, 300]; InitialValues=[11, 14, 55, 24, 5.99]; InitialValuesUnits=kg/ha; WaterTableConcentration=0; D0=0; DepthConstant=0; MaxDepthSoluteAccessible=0; RunoffEffectivenessAtMovingSolute=0; MaxEffectiveRunoff=0
          Solute NH4: Thickness=[150, 150, 600, 300, 300]; InitialValues=[0.89, 0.312, 0.18, 0, 0.48]; InitialValuesUnits=ppm; WaterTableConcentration=0; D0=0; DepthConstant=0; MaxDepthSoluteAccessible=0; RunoffEffectivenessAtMovingSolute=0; MaxEffectiveRunoff=0
          Solute Urea: Thickness=[150, 150, 600, 300, 300]; InitialValues=[0, 0, 0, 0, 0]; InitialValuesUnits=kg/ha; WaterTableConcentration=0; D0=0; DepthConstant=0; MaxDepthSoluteAccessible=0; RunoffEffectivenessAtMovingSolute=0; MaxEffectiveRunoff=0
          OutputLayers OutputNutrientLayers: Thickness=[150, 150, 300, 300, 300]
          OutputLayers OutputWaterLayers: Thickness=[200, 200, 200, 200, 200, 200, 200]
        SurfaceOrganicMatter: InitialResidueName=grass; InitialResidueType=grass; InitialResidueMass=2500; InitialStandingFraction=0; InitialCPR=0; InitialCNR=12.43
        MicroClimate: a_interception=0; b_interception=1; c_interception=0; d_interception=0; SoilHeatFluxFraction=0.4; MinimumHeightDiffForNewLayer=0; NightInterceptionFraction=0.5; ReferenceHeight=2
        Irrigation
        Operations Irrig
          2017-11-02  [Irrigation].Apply(20);
          2017-11-10  [Irrigation].Apply(25);
          2017-11-20  [Irrigation].Apply(25);
          2017-12-04  [Irrigation].Apply(25);
          2017-12-11  [Irrigation].Apply(25);
          2017-12-18  [Irrigation].Apply(25);
          2017-12-28  [Irrigation].Apply(25);
          2018-01-03  [Irrigation].Apply(25);
        Fertiliser
        Operations Fert
        Folder Management
          Manager ExtraVariables: same as Lincoln2012.Lincoln2012.RainShelter.ExtraVariables
          Manager Sowing
            CropName = WheatFARAblock
            EstablishDate = 09/06/2017 00:00:00
            EstablishStage = Seed
            PlantingDepth = 15
            HarvestDate = 02/02/2018 00:00:00
            HarvestTT = -
            HarvestStage = Maturity
            PotentialYield = 13.5
            FieldLoss = 0
            ResidueRemoval = 0
            script: same as in SCRUMSownFromManager.Field.Sow Cereal on a fixed date
        Report: EventNames=[Clock].DoReport
          VariableNames:
            [Clock].Today
            [ExtraVariables].Script.AccumPlantN
            [ExtraVariables].Script.AccumMineralisation
            [ExtraVariables].Script.AccumDenit
            [ExtraVariables].Script.AccumFert
            [ExtraVariables].Script.AccumLeach
            [ExtraVariables].Script.AccumDetach
            [ExtraVariables].Script.DeltaSoilOMN
            [ExtraVariables].Script.DeltaSurfaceOMN
            [ExtraVariables].Script.DeltaSoilMineralN
            [ExtraVariables].Script.SWC
            [ExtraVariables].Script.DUL
            [ExtraVariables].Script.OutFlowLat
            [ExtraVariables].Script.AccumEO
            [ExtraVariables].Script.AccumEP
            [ExtraVariables].Script.AccumES
            [ExtraVariables].Script.AccumDrainage
            [ExtraVariables].Script.AccumRunoff
            [ExtraVariables].Script.AccumRainfall
            [ExtraVariables].Script.AccumIrrigation
            [ExtraVariables].Script.AccumOutflowLat
            [ExtraVariables].Script.SoilWaterDeficit
            [ExtraVariables].Script.SoilNitrogenContent
            [ExtraVariables].Script.FomN
            [ExtraVariables].Script.HumN
            [ExtraVariables].Script.BiomN
            [ExtraVariables].Script.DltNMinRes
            [ExtraVariables].Script.DltNMinTot
            [Soil].Water.Volumetric
            [Soil].OutputNutrientLayers.MineralN
            [Soil].Nutrient.MineralisedN
            sum([Soil].Nutrient.MineralisedN[1:5]) as ProfileMineralisedN
            [Soil].SoilWater.Eo
            [Soil].SoilWater.Es
            [Soil].SoilWater.Drainage
            [Soil].SoilWater.Runoff
            [Soil].OutputWaterLayers.SWmm
            sum([Soil].Water.MM[1:8]) as ProfileWater
            [Soil].NO3.kgha
            [SCRUM].Product.Live.Wt* 10 as Product.Wt
            [SCRUM].Product.Live.Wt
            [SCRUM].Stover.Live.Wt
            [SCRUM].Stover.Live.Wt* 10 as Stover.Wt
            ([SCRUM].Stover.Live.Wt + [SCRUM].Product.Live.Wt)* 10 as AboveTotal.Wt
            [SCRUM].Root.Live.Wt
            [SCRUM].Product.Live.N
            [SCRUM].Product.Live.N *10 as ProductN.Wt
            [SCRUM].Stover.Live.N
            ([SCRUM].Stover.Live.N + [SCRUM].Product.Live.N)*10 as AboveTotalN.Wt
            [SCRUM].Root.Live.N
            [SCRUM].Root.WaterUptake
            [SCRUM].Stover.Transpiration
            [SCRUM].Stover.WaterDemand
            [SCRUM].Root.Depth
            (-[SCRUM].Root.NUptake) as UptakeN
            [SCRUM].Stover.CoverTotal
            [SCRUM].Stover.LAI
            [SCRUM].Stover.Height
            [SCRUM].Phenology.Stage
            [SCRUM].AboveGround.N
            [SCRUM].AboveGround.Wt
            [SCRUM].Total.N
            [SCRUM].Total.Wt *10 as Total.Wt
            [SCRUM].Total.Wt
            [SCRUM].Arbitrator.N.TotalPlantDemand
            [SCRUM].Arbitrator.N.TotalPlantSupply
            [SCRUM].Arbitrator.DM.TotalFixationSupply
            [SCRUM].Arbitrator.DM.TotalPlantDemand
            [SCRUM].Arbitrator.DM.Allocated
            [SCRUM].Arbitrator.DM.SinkLimitation
            [SCRUM].Arbitrator.DM.NutrientLimitation
            [SCRUM].Stover.MaximumNConc
            [SCRUM].Stover.MinimumNConc
            [SCRUM].Stover.Live.NConc
            [SCRUM].Stover.Live.NConc
            [SCRUM].Product.Live.NConc
            [SCRUM].Stover.Fw
            [SCRUM].Arbitrator.FN
            [SCRUM].Phenology.CurrentStageName
        Report BaseReport: EventNames=[Clock].DoReport
          VariableNames:
            [Clock].Today as Date
            //[RotationManagement].Script.CurrentCrop as CurrentCrop
            //[RotationManagement].Script.CurrentCropNumber as CurrentCropNumber
            //[RotationManagement].Script.CurrentCropIndex as CurrentCropIndex
            //[ExtraSums].Script.YearsSummed + 1 as SimYear
            //[RotationManagement].Script.CropPhenoStage as CropPhenoStage
            //[ExtraSums].Script.DateNormalised as DateNormalised
            // Water outputs
            [Weather].Rain as Rainfall
            [Irrigation].IrrigationApplied as Irrigation
            [MicroClimate].PrecipitationInterception as PrecipitationInterception
            [Soil].SoilWater.Eo as Eo
            [Soil].SoilWater.Es as Evaporation
            //[RotationManagement].Script.CropTranspiration as Transpiration
            [Soil].SoilWater.Drainage as Drainage
            [Soil].SoilWater.Runoff as Runoff
            sum([Soil].SoilWater.LateralOutflow) as LateralFlow
            [Soil].SoilWater.pond as PondedWater
            sum([Soil].Water.MM) as TotalSWC
            sum([Soil].Physical.SATmm) as TotalSAT
            sum([Soil].Physical.DULmm) as TotalDUL
            sum([Soil].Physical.LL15mm) as TotalLL15
            [Soil].Water.Volumetric[1] as TopLayerSWC
            [Soil].Physical.DUL[1] as TopLayerDUL
            [Soil].Physical.LL15[1] as TopLayerLL15
            //[IrrigationManager].Script.SoilWaterDeficit as IrrigatorSWDeficit
            //([IrrigationManager].Script.SoilWaterDeficit/([IrrigationManager].Script.MonitoredLayerDUL - [IrrigationManager].Script.MonitoredLayerLL)) as IrrigatorSWDeficit_pct
            // Nitrogen outputs
            [Fertiliser].NitrogenApplied as FertiliserN
            //([RotationManagement].Script.CropFixedN*10.0) as FixedN
            (sum([Soil].Nutrient.MineralisedN) + sum([SurfaceOrganicMatter].SurfaceResidue.Decomposition.MineralisedN)) as NetMineralisedN
            sum([Soil].Nutrient.MineralisedN) as MineralisedSoilN
            sum([SurfaceOrganicMatter].SurfaceResidue.Decomposition.MineralisedN) as MineralisedSurfOMN
            sum([Soil].Nutrient.Natm) as DenitrifiedN
            ([Soil].SoilWater.LeachUrea + [Soil].SoilWater.LeachNH4 + [Soil].SoilWater.LeachNO3) as LeachedN
            sum([SCRUM].Arbitrator.N.Uptake) as NUptake
            //([RotationManagement].Script.CropAbovegroundDetachedN + [RotationManagement].Script.CropBelowgroundDetachedN)*10.0 as DetachedPlantN
            //([RotationManagement].Script.DefoliationReturnedDungN*10.0) as DungDepositedN
            //([RotationManagement].Script.DefoliationReturnedUrineN*10.0) as UrineDepositedN
            //([RotationManagement].Script.ResiduesRemovedN*10.0) as ResiduesRemovedN
            (sum([Soil].Urea.kgha) + sum([Soil].NH4.kgha) + sum([Soil].NO3.kgha)) as TotalMineralN
            sum([Soil].Urea.kgha) as TotalUrea
            sum([Soil].NH4.kgha) as TotalNH4
            sum([Soil].NO3.kgha) as TotalNO3
            [SurfaceOrganicMatter].N as TotalSurfOMN
            sum([Soil].Nutrient.FOM.N) as TotalFOMN
            sum([Soil].Nutrient.Humic.N) as TotalHumicN
            sum([Soil].Nutrient.Microbial.N) as TotalMicrobialN
            //([RotationManagement].Script.CropTotalN*10.0) as TotalPlantN
            // Crop outputs
            //([RotationManagement].Script.CropTotalWt*10.0) as TotalPlantWt
            //([RotationManagement].Script.CropAbovegroundWt*10.0) as AboveGroundPlantWt
            //([RotationManagement].Script.CropBelowgroundWt*10.0) as BelowGroundPlantWt
            //([RotationManagement].Script.CropAbovegroundNconc as AboveGroundNConc
            //([RotationManagement].Script.CropBelowgroundNconc as BelowGroundNConc
            //([RotationManagement].Script.CropLAIGreen as LAIGreen
            //([RotationManagement].Script.CropLAIDead as LAIDead
            //[MicroClimate].CanopyCover as CoverTotal
            //([RotationManagement].Script.CropShootHeight as CropHeight
            //([RotationManagement].Script.CropRootDepth as RootDepth
            // Harvest outputs
            //[RotationManagement].Script.HarvestedWt*10.0 as HarvestedWt
            //[RotationManagement].Script.HarvestedN*10.0 as HarvestedN
            //[RotationManagement].Script.DefoliatedWt*10.0 as DefoliatedWt
            //[RotationManagement].Script.DefoliatedN*10.0 as DefoliatedN
            //([RotationManagement].Script.HarvestedWt + [RotationManagement].Script.DefoliatedWt)*10.0 as OffTakePlantWt
            //([RotationManagement].Script.HarvestedN + [RotationManagement].Script.DefoliatedN)*10.0 as OffTakePlantN
            // Other - Extras
            [Weather].Radn as RadiationTotal
            [MicroClimate].RadiationInterception as RadiationIntercepted
            [Weather].MeanT as MeanAirTemperature
            [Soil].Temperature.Value[1] as TopSoilTemperature
            //([RotationManagement].Script.CropAbovegroundDetachedWt + [RotationManagement].Script.CropBelowgroundDetachedWt)*10.0 as DetachedPlantWt
            //([RotationManagement].Script.DefoliationReturnedWt)*10.0 as DungWt
            //([RotationManagement].Script.ResiduesRemovedWt)*10.0 as ResiduesRemovedWt
            [SurfaceOrganicMatter].Wt as TotalSurfaceOMWt
            ([SurfaceOrganicMatter].C/([SurfaceOrganicMatter].N + 0.000000001)) as SurfOMCNratio
            sum([Soil].Nutrient.FOM.C)/0.4 as FOMWt
            (sum([Soil].Nutrient.FOM.C)/(sum([Soil].Nutrient.FOM.N) + 0.000000001)) as FOMCNratio
            //[ExtraSums].Script.DownDrainageShallowLayer as DownDrainageShallowLayer
            //[ExtraSums].Script.NetWaterFlowShallowLayer as NetWaterFlowShallowLayer
            //[ExtraSums].Script.LeachedNShallowLayer as LeachedNShallowLayer
            //[ExtraSums].Script.DownDrainageDeepLayer as DownDrainageDeepLayer
            //[ExtraSums].Script.NetWaterFlowDeepLayer as NetWaterFlowDeepLayer
            //[ExtraSums].Script.LeachedNDeepLayer as LeachedNDeepLayer
            sum([Soil].Nutrient.N2Oatm) as N2OEmissions
        Plant SCRUM
          ScrumCrop WheatFARAblock: HarvestIndex=0.1; MoisturePc=14; Proot=0.1; MaxRD=1500; MaxHeight=800; Acover=0.97; ExtinctCoeff=0.55; RootNConc=0.01; StoverNConc=0.0001; ProductNConc=0.035; SeedlingNConc=0.005; BaseT=0; OptT=30; MaxT=40; Legume=false; WaterStress=true
  Experiment Chertsey2022
    Factors
      Factor N: Specification=[Fert]
        Operations Level1
        Operations Level2
          2021-09-01  [Fertiliser].Apply(40, [Fertiliser].Types.UreaN, 10);
          2021-10-13  [Fertiliser].Apply(172, [Fertiliser].Types.UreaN, 10);
          2021-11-11  [Fertiliser].Apply(88, [Fertiliser].Types.UreaN, 10);
        Operations Level3
          2021-09-01  [Fertiliser].Apply(40, [Fertiliser].Types.UreaN, 10);
          2021-10-13  [Fertiliser].Apply(160, [Fertiliser].Types.UreaN, 10);
          2021-11-11  [Fertiliser].Apply(82, [Fertiliser].Types.UreaN, 10);
        Operations Level4
          2021-09-01  [Fertiliser].Apply(40, [Fertiliser].Types.UreaN, 10);
          2021-10-13  [Fertiliser].Apply(122, [Fertiliser].Types.UreaN, 10);
          2021-11-11  [Fertiliser].Apply(63, [Fertiliser].Types.UreaN, 10);
        Operations Level5
          2021-09-01  [Fertiliser].Apply(40, [Fertiliser].Types.UreaN, 10);
          2021-10-13  [Fertiliser].Apply(76, [Fertiliser].Types.UreaN, 10);
          2021-11-11  [Fertiliser].Apply(39, [Fertiliser].Types.UreaN, 10);
    Simulation ChertseyWheat2022
      Weather: FileName=WinchmoreMet.met
      Clock: Start=2021-04-22; End=2022-02-17
      Summary
      SoilArbitrator Soil Arbitrator
      Zone Field: Area=1; Slope=0; AspectAngle=0; Altitude=50
        SurfaceOrganicMatter: InitialResidueName=grass; InitialResidueType=grass; InitialResidueMass=0; InitialStandingFraction=0; InitialCPR=0; InitialCNR=12.43
        Soil Templeton: SoilType=Udic Haplustept (US),  Immature Pallic Soil (NZ); LocalName=Templeton Fine Sandy Loam; Region=Canterbury; Country=New Zealand; Latitude=0; Longitude=0; DataSource=Adapted based on data from the NZ Natioanl Soils Database
          Comments=Different references name the soil at the site as either Templeton or Paparua (very similar soils)
          Physical
            Thickness  ParticleSizeClay  ParticleSizeSand  ParticleSizeSilt  BD    AirDry  LL15   DUL    SAT    KS
            150        21.8              17.4              60.9              1.35  0.057   0.17   0.42   0.439  2913.761
            150        18.3              24.8              56.9              1.43  0.159   0.177  0.4    0.409  1052.63
            200        19.5              21                59.5              1.54  0.186   0.186  0.36   0.362  182.149
            250        10.3              37                52.6              1.54  0.13    0.13   0.35   0.358  1272.997
            250        9.5               43.6              46.9              1.48  0.116   0.116  0.36   0.365  1767.199
            500        16.6              24.2              59.3              1.41  0.138   0.138  0.273  0.39   586.553
            SoilCrop SCRUMSoil: LL=[0.17, 0.18, 0.19, 0.13, 0.12, 0.14]; KL=[0.12, 0.11, 0.06, 0.03, 0.01, 0.01]; XF=[1, 1, 1, 1, 1, 1]
          Chemical: Thickness=[150, 150, 200, 250, 250, 500]; PH=[6, 6, 6, 6, 6, 6]; PHUnits=Water
          WaterBalance SoilWater: SummerDate=1-Nov; SummerU=6; SummerCona=3.5; WinterDate=1-apr; WinterU=2; WinterCona=2; DiffusConst=88; DiffusSlope=35; Salb=0.13; CN2Bare=73; CNRed=20; CNCov=0.8; PSIDul=-100; Thickness=[150, 150, 200, 250, 250, 500]; SWCON=[0.5, 0.41, 0.27, 0.39, 0.49, 0.42]
          Organic: FOMCNRatio=30; CarbonUnits=Total
            Thickness  Carbon  SoilCNRatio  FBiom  FInert  FOM
            150        2.6     11.3         0.045  0.375   200
            150        1.01    11.3         0.025  0.795   150
            200        0.4     11.3         0.022  0.895   100
            250        0.19    11.3         0.02   0.94    50
            250        0.22    11.3         0.01   0.96    10
            500        0.18    11.3         0.01   0.99    5
          Water: Thickness=[150, 150, 200, 250, 250, 500]; InitialValues=[0.4, 0.4, 0.35, 0.32, 0.35, 0.273]; InitialPAWmm=274.25; RelativeTo=LL15; FilledFromTop=true
          CERESSoilTemperature Temperature
          Nutrient
          Solute NO3: Thickness=[150, 150, 200, 250, 250, 500]; InitialValues=[10, 5, 5, 5, 5, 5]; InitialValuesUnits=kg/ha; WaterTableConcentration=0; D0=0; DepthConstant=0; MaxDepthSoluteAccessible=0; RunoffEffectivenessAtMovingSolute=0; MaxEffectiveRunoff=0
          Solute NH4: Thickness=[150, 150, 200, 250, 250, 500]; InitialValues=[0.494, 0.35, 0.2, 0.2, 0.135, 0.071]; InitialValuesUnits=ppm; WaterTableConcentration=0; D0=0; DepthConstant=0; MaxDepthSoluteAccessible=0; RunoffEffectivenessAtMovingSolute=0; MaxEffectiveRunoff=0
          Solute Urea: Thickness=[150, 150, 200, 250, 250, 500]; InitialValues=[0, 0, 0, 0, 0, 0]; InitialValuesUnits=kg/ha; WaterTableConcentration=0; D0=0; DepthConstant=0; MaxDepthSoluteAccessible=0; RunoffEffectivenessAtMovingSolute=0; MaxEffectiveRunoff=0
          OutputLayers OutputNutrientLayers: Thickness=[150, 150, 200, 300, 300]
          OutputLayers OutputWaterLayers: Thickness=[200, 200, 200, 200, 200, 200, 200]
        MicroClimate: a_interception=0; b_interception=1; c_interception=0; d_interception=0; SoilHeatFluxFraction=0.4; MinimumHeightDiffForNewLayer=0; NightInterceptionFraction=0.5; ReferenceHeight=2
        Irrigation
        Operations Irrig
          2021-10-29  [Irrigation].Apply(10);
          2021-11-02  [Irrigation].Apply(20);
          2021-11-11  [Irrigation].Apply(20);
          2021-11-16  [Irrigation].Apply(25);
          2022-01-07  [Irrigation].Apply(30);
        Fertiliser
        Operations Fert
        Folder Management
          Manager ExtraVariables: same as Lincoln2012.Lincoln2012.RainShelter.ExtraVariables
          Manager Sowing
            CropName = WheatChertsey2022
            EstablishDate = 08/22/2021 00:00:00
            EstablishStage = Seed
            PlantingDepth = 15
            HarvestDate = 02/09/2022 00:00:00
            HarvestTT = -
            HarvestStage = Maturity
            PotentialYield = 12
            FieldLoss = 0
            ResidueRemoval = 0
            script: same as in SCRUMSownFromManager.Field.Sow Cereal on a fixed date
        Report: EventNames=[Clock].DoReport
          VariableNames:
            [Clock].Today
            [ExtraVariables].Script.AccumPlantN
            [ExtraVariables].Script.AccumMineralisation
            [ExtraVariables].Script.AccumDenit
            [ExtraVariables].Script.AccumFert
            [ExtraVariables].Script.AccumLeach
            [ExtraVariables].Script.AccumDetach
            [ExtraVariables].Script.DeltaSoilOMN
            [ExtraVariables].Script.DeltaSurfaceOMN
            [ExtraVariables].Script.DeltaSoilMineralN
            [ExtraVariables].Script.SWC
            [ExtraVariables].Script.DUL
            [ExtraVariables].Script.OutFlowLat
            [ExtraVariables].Script.AccumEO
            [ExtraVariables].Script.AccumEP
            [ExtraVariables].Script.AccumES
            [ExtraVariables].Script.AccumDrainage
            [ExtraVariables].Script.AccumRunoff
            [ExtraVariables].Script.AccumRainfall
            [ExtraVariables].Script.AccumIrrigation
            [ExtraVariables].Script.AccumOutflowLat
            [ExtraVariables].Script.SoilWaterDeficit
            [ExtraVariables].Script.SoilNitrogenContent
            [ExtraVariables].Script.FomN
            [ExtraVariables].Script.HumN
            [ExtraVariables].Script.BiomN
            [ExtraVariables].Script.DltNMinRes
            [ExtraVariables].Script.DltNMinTot
            [Soil].Water.Volumetric
            [Soil].OutputNutrientLayers.MineralN
            [Soil].Nutrient.MineralisedN
            sum([Soil].Nutrient.MineralisedN[1:5]) as ProfileMineralisedN
            [Soil].SoilWater.Eo
            [Soil].SoilWater.Es
            [Soil].SoilWater.Drainage
            [Soil].SoilWater.Runoff
            [Soil].OutputWaterLayers.SWmm
            //sum([Soil].Water.MM[1:8]) as ProfileWater
            [Soil].NO3.kgha
            [SCRUM].Product.Live.Wt* 10 as Product.Wt
            [SCRUM].Product.Live.Wt
            [SCRUM].Stover.Live.Wt
            [SCRUM].Stover.Live.Wt* 10 as Stover.Wt
            ([SCRUM].Stover.Live.Wt + [SCRUM].Product.Live.Wt)* 10 as AboveTotal.Wt
            [SCRUM].Root.Live.Wt
            [SCRUM].Product.Live.N
            [SCRUM].Product.Live.N *10 as ProductN.Wt
            [SCRUM].Stover.Live.N
            [SCRUM].Stover.Live.N *10 as StoverN.Wt
            ([SCRUM].Stover.Live.N + [SCRUM].Product.Live.N)*10 as AboveTotalN.Wt
            [SCRUM].Root.Live.N
            [SCRUM].Root.WaterUptake
            [SCRUM].Stover.Transpiration
            [SCRUM].Stover.WaterDemand
            [SCRUM].Stover.Fw
            [SCRUM].Stover.Fn
            [SCRUM].Root.Depth
            (-[SCRUM].Root.NUptake) as UptakeN
            [SCRUM].Stover.CoverTotal
            [SCRUM].Stover.LAI
            [SCRUM].Stover.Height
            [SCRUM].Phenology.Stage
            [SCRUM].AboveGround.N
            [SCRUM].AboveGround.Wt
            [SCRUM].Total.N
            [SCRUM].Total.Wt *10 as Total.Wt
            [SCRUM].Total.Wt
            [SCRUM].Arbitrator.N.TotalPlantDemand
            [SCRUM].Arbitrator.N.TotalPlantSupply
            [SCRUM].Arbitrator.DM.TotalFixationSupply
            [SCRUM].Arbitrator.DM.TotalPlantDemand
            [SCRUM].Arbitrator.DM.Allocated
            [SCRUM].Arbitrator.DM.SinkLimitation
            [SCRUM].Arbitrator.DM.NutrientLimitation
            [SCRUM].Stover.MaximumNConc
            [SCRUM].Stover.MinimumNConc
            [SCRUM].Stover.Live.NConc
            [SCRUM].Stover.Live.NConc
            [SCRUM].Product.Live.NConc
            [SCRUM].Stover.Fw
            [SCRUM].Arbitrator.FN
            [SCRUM].Phenology.CurrentStageName
        Report BaseReport: same as FARABlock.ABlock.Field.BaseReport
        Plant SCRUM
          ScrumCrop WheatChertsey2022: HarvestIndex=0.45; MoisturePc=14; Proot=0.1; MaxRD=1500; MaxHeight=800; Acover=0.97; ExtinctCoeff=0.55; RootNConc=0.01; StoverNConc=0.009; ProductNConc=0.016; SeedlingNConc=0.05; BaseT=0; OptT=30; MaxT=40; Legume=false; WaterStress=true
  Experiment Chertsey2023
    Factors
      Factor N: Specification=[Fert]
        Operations Level1
        Operations Level2
          2022-09-23  [Fertiliser].Apply(40, [Fertiliser].Types.UreaN, 10);
          2022-10-18  [Fertiliser].Apply(172, [Fertiliser].Types.UreaN, 10);
          2022-11-10  [Fertiliser].Apply(88, [Fertiliser].Types.UreaN, 10);
        Operations Level3
          2022-09-23  [Fertiliser].Apply(40, [Fertiliser].Types.UreaN, 10);
          2022-10-18  [Fertiliser].Apply(157, [Fertiliser].Types.UreaN, 10);
          2022-11-10  [Fertiliser].Apply(81, [Fertiliser].Types.UreaN, 10);
        Operations Level4
          2022-09-23  [Fertiliser].Apply(40, [Fertiliser].Types.UreaN, 10);
          2022-10-18  [Fertiliser].Apply(98, [Fertiliser].Types.UreaN, 10);
          2022-11-10  [Fertiliser].Apply(50, [Fertiliser].Types.UreaN, 10);
        Operations Level5
          2022-09-23  [Fertiliser].Apply(40, [Fertiliser].Types.UreaN, 10);
          2022-10-18  [Fertiliser].Apply(125, [Fertiliser].Types.UreaN, 10);
          2022-11-10  [Fertiliser].Apply(65, [Fertiliser].Types.UreaN, 10);
        Operations Level6
          2022-09-23  [Fertiliser].Apply(40, [Fertiliser].Types.UreaN, 10);
          2022-10-18  [Fertiliser].Apply(118, [Fertiliser].Types.UreaN, 10);
          2022-11-10  [Fertiliser].Apply(61, [Fertiliser].Types.UreaN, 10);
    Simulation ChertseyWheat2023
      Weather: FileName=WinchmoreMet.met
      Clock: Start=2022-04-27; End=2023-02-23
      Summary
      SoilArbitrator Soil Arbitrator
      Zone Field: Area=1; Slope=0; AspectAngle=0; Altitude=50
        Soil Templeton: SoilType=Udic Haplustept (US),  Immature Pallic Soil (NZ); LocalName=Templeton Fine Sandy Loam; Region=Canterbury; Country=New Zealand; Latitude=0; Longitude=0; DataSource=Adapted based on data from the NZ Natioanl Soils Database
          Comments=Different references name the soil at the site as either Templeton or Paparua (very similar soils)
          Physical
            Thickness  ParticleSizeClay  ParticleSizeSand  ParticleSizeSilt  BD    AirDry  LL15   DUL    SAT    KS
            150        21.8              17.4              60.9              1.35  0.057   0.17   0.34   0.439  2913.761
            150        18.3              24.8              56.9              1.43  0.159   0.177  0.325  0.409  1052.63
            200        19.5              21                59.5              1.54  0.186   0.186  0.327  0.362  182.149
            250        10.3              37                52.6              1.54  0.13    0.13   0.251  0.358  1272.997
            250        9.5               43.6              46.9              1.48  0.116   0.116  0.24   0.365  1767.199
            500        16.6              24.2              59.3              1.41  0.138   0.138  0.273  0.39   586.553
            SoilCrop SCRUMSoil: LL=[0.17, 0.18, 0.19, 0.13, 0.12, 0.14]; KL=[0.12, 0.11, 0.06, 0.03, 0.01, 0.01]; XF=[1, 1, 1, 1, 1, 1]
          Chemical: Thickness=[150, 150, 200, 250, 250, 500]; PH=[6, 6, 6, 6, 6, 6]; PHUnits=Water
          WaterBalance SoilWater: same as Chertsey2022.ChertseyWheat2022.Field.Templeton.SoilWater
          Organic: FOMCNRatio=25; CarbonUnits=Total
            Thickness  Carbon  SoilCNRatio  FBiom  FInert  FOM
            150        2.6     11.3         0.045  0.35    300
            150        1.01    11.3         0.025  0.5     1000
            200        0.4     11.3         0.022  0.6     200
            250        0.19    11.3         0.02   0.89    150
            250        0.22    11.3         0.01   0.96    20
            500        0.18    11.3         0.01   0.99    5
          Water: Thickness=[150, 150, 200, 250, 250, 500]; InitialValues=[0.34, 0.325, 0.327, 0.251, 0.24, 0.269]; InitialPAWmm=202.65; RelativeTo=LL15; FilledFromTop=true
          CERESSoilTemperature Temperature
          Nutrient
          Solute NO3: Thickness=[150, 150, 200, 250, 250, 500]; InitialValues=[10, 5, 20, 15, 3, 3]; InitialValuesUnits=kg/ha; WaterTableConcentration=0; D0=0; DepthConstant=0; MaxDepthSoluteAccessible=0; RunoffEffectivenessAtMovingSolute=0; MaxEffectiveRunoff=0
          Solute NH4: same as Chertsey2022.ChertseyWheat2022.Field.Templeton.NH4
          Solute Urea: same as Chertsey2022.ChertseyWheat2022.Field.Templeton.Urea
          OutputLayers OutputNutrientLayers: Thickness=[300, 200, 200, 300, 300]
          OutputLayers OutputWaterLayers: Thickness=[200, 200, 200, 200, 200, 200, 200]
        SurfaceOrganicMatter: InitialResidueName=grass; InitialResidueType=grass; InitialResidueMass=0; InitialStandingFraction=0; InitialCPR=0; InitialCNR=12.43
        MicroClimate: a_interception=0; b_interception=1; c_interception=0; d_interception=0; SoilHeatFluxFraction=0.4; MinimumHeightDiffForNewLayer=0; NightInterceptionFraction=0.5; ReferenceHeight=2
        Irrigation
        Operations Irrig
          2022-11-08  [Irrigation].Apply(20);
          2022-11-11  [Irrigation].Apply(15);
          2022-11-17  [Irrigation].Apply(20);
          2023-01-04  [Irrigation].Apply(25);
        Fertiliser
        Operations Fert
        Plant SCRUM
          ScrumCrop WheatChertsey2023: HarvestIndex=0.45; MoisturePc=14; Proot=0.1; MaxRD=1500; MaxHeight=800; Acover=0.97; ExtinctCoeff=0.55; RootNConc=0.01; StoverNConc=0.009; ProductNConc=0.016; SeedlingNConc=0.05; BaseT=0; OptT=30; MaxT=40; Legume=false; WaterStress=true
        Folder Management
          Manager ExtraVariables: same as Lincoln2012.Lincoln2012.RainShelter.ExtraVariables
          Manager Sowing
            CropName = WheatChertsey2023
            EstablishDate = 08/27/2022 00:00:00
            EstablishStage = Seed
            PlantingDepth = 15
            HarvestDate = 01/21/2023 00:00:00
            HarvestTT = -
            HarvestStage = Maturity
            PotentialYield = 14
            FieldLoss = 0
            ResidueRemoval = 0
            script: same as in SCRUMSownFromManager.Field.Sow Cereal on a fixed date
        Report BaseReport: same as FARABlock.ABlock.Field.BaseReport
        Report: same as Chertsey2022.ChertseyWheat2022.Field.Report
  Experiment PRyegrass
    Factors
      Permutation
        Factor N: Specification=[Fert]
          Operations Level1
            2014-08-10  [Fertiliser].Apply(100, [Fertiliser].Types.UreaN, 10);
          Operations Level2
            2014-09-10  [Fertiliser].Apply(40, [Fertiliser].Types.UreaN, 10);
            2014-10-24  [Fertiliser].Apply(15, [Fertiliser].Types.UreaN, 10);
            2014-11-17  [Fertiliser].Apply(15, [Fertiliser].Types.UreaN, 10);
            2014-08-10  [Fertiliser].Apply(100, [Fertiliser].Types.UreaN, 10);
          Operations Level3
            2014-09-10  [Fertiliser].Apply(40, [Fertiliser].Types.UreaN, 10);
            2014-10-24  [Fertiliser].Apply(35, [Fertiliser].Types.UreaN, 10);
            2014-11-17  [Fertiliser].Apply(35, [Fertiliser].Types.UreaN, 10);
            2014-08-10  [Fertiliser].Apply(100, [Fertiliser].Types.UreaN, 10);
          Operations Level4
            2014-09-10  [Fertiliser].Apply(40, [Fertiliser].Types.UreaN, 10);
            2014-10-24  [Fertiliser].Apply(55, [Fertiliser].Types.UreaN, 10);
            2014-11-17  [Fertiliser].Apply(55, [Fertiliser].Types.UreaN, 10);
            2014-08-10  [Fertiliser].Apply(100, [Fertiliser].Types.UreaN, 10);
          Operations Level5
            2014-09-10  [Fertiliser].Apply(40, [Fertiliser].Types.UreaN, 10);
            2014-10-24  [Fertiliser].Apply(75, [Fertiliser].Types.UreaN, 10);
            2014-11-17  [Fertiliser].Apply(75, [Fertiliser].Types.UreaN, 10);
            2014-08-10  [Fertiliser].Apply(100, [Fertiliser].Types.UreaN, 10);
          Operations Level6
            2014-09-10  [Fertiliser].Apply(40, [Fertiliser].Types.UreaN, 10);
            2014-10-24  [Fertiliser].Apply(95, [Fertiliser].Types.UreaN, 10);
            2014-11-17  [Fertiliser].Apply(95, [Fertiliser].Types.UreaN, 10);
            2014-08-10  [Fertiliser].Apply(100, [Fertiliser].Types.UreaN, 10);
    Simulation PRyegrass
      Weather: FileName=Methven.met
      Clock: Start=2014-03-22; End=2015-01-27
      Summary
      SoilArbitrator Soil Arbitrator
      Zone Field: Area=1; Slope=0; AspectAngle=0; Altitude=50
        Soil: Region=Plains; State=Canterbury; Country=New Zealand; Latitude=0; Longitude=0
          DataSource=Generic profile descriptions provided by Trevor Webb and data for functional horizions based on SWAMP project results
          Comments=Bulk density values were measured on the fine earth fraction so values entered into apsim soil are adjusted down to account for stone content (assuming stones are inert from all soil process so their mass and volume is removed from model paramaters).  SAT, DUL, LL15 and Air dry have been adjusted down to account for stone content.  OC has not been adjusted so the model will get the correct carbon and N amounts using the adjusted BD.
          Physical
            Thickness  ParticleSizeClay  ParticleSizeSand  ParticleSizeSilt  Rocks  BD     AirDry  LL15   DUL    SAT    KS
            100        22                15                63                0      1.23   0.063   0.19   0.36   0.535  480
            100        22                15                63                0      1.235  0.065   0.195  0.365  0.53   420
            200        21.5              12.5              66                0      1.37   0.074   0.185  0.35   0.482  240
            200        20                15                65                0      1.66   0.06    0.15   0.335  0.374  24
            200        22.5              5                 72.5              0      1.59   0.074   0.185  0.375  0.4    24
            200        8                 45                47                0      1.44   0.04    0.1    0.325  0.45   1200
            200        15                25                60                0      1.525  0.048   0.12   0.34   0.425  480
            200        5                 60                35                0      1.36   0.028   0.07   0.28   0.475  720
            200        6                 50                44                0      1.35   0.032   0.08   0.3    0.46   1200
            200        6                 50                44                0      1.35   0.032   0.08   0.3    0.46   1140
            SoilCrop SCRUMSoil
              LL=[0.19, 0.195, 0.185, 0.15, 0.185, 0.1, 0.12, 0.07, 0.08, 0.08]
              KL=[0.1, 0.08, 0.05, 0.035, 0.022, 0.013, 0.007, 0.002, 0.001, 0]
              XF=[1, 1, 1, 1, 1, 1, 1, 1, 1, 1]
          WaterBalance SoilWater: same as FARABlock.ABlock.Field.Soil.SoilWater
          Nutrient
          Organic: FOMCNRatio=31.5; CarbonUnits=Total
            Thickness  Carbon  SoilCNRatio  FBiom  FInert  FOM
            100        2.677   12           0.06   0.315   716.8
            100        2.784   12           0.046  0.522   505.4
            200        1.454   11.5         0.01   0.785   492.4
            200        0.383   10           0.008  0.899   181.2
            200        0.243   9.5          0.008  0.953   66.6
            400        0.243   9            0.008  0.969   24.5
            200        0.243   9            0.008  0.989   9
            200        0.243   9            0.008  0.99    3.3
            200        0.243   9            0.008  0.987   1.2
            200        0.243   9            0.008  0.988   0
          Water: Thickness=[100, 200, 300, 200, 100, 200, 100, 300]; InitialValues=[0.27, 0.27, 0.29, 0.3, 0.3, 0.3, 0.3, 0.225]; InitialPAWmm=207; RelativeTo=LL15; FilledFromTop=true
          Chemical: Thickness=[150, 150, 300, 300, 300]; PH=[6, 6, 6, 6, 6]; PHUnits=Water
          CERESSoilTemperature Temperature
          Solute NO3: Thickness=[150, 150, 300, 300, 300]; InitialValues=[150, 5, 5, 5, 5.99]; InitialValuesUnits=kg/ha; WaterTableConcentration=0; D0=0; DepthConstant=0; MaxDepthSoluteAccessible=0; RunoffEffectivenessAtMovingSolute=0; MaxEffectiveRunoff=0
          Solute NH4: Thickness=[150, 150, 300, 300, 300]; InitialValues=[0.89, 0.312, 0.18, 0, 0.48]; InitialValuesUnits=ppm; WaterTableConcentration=0; D0=0; DepthConstant=0; MaxDepthSoluteAccessible=0; RunoffEffectivenessAtMovingSolute=0; MaxEffectiveRunoff=0
          Solute Urea: Thickness=[150, 150, 300, 300, 300]; InitialValues=[0, 0, 0, 0, 0]; InitialValuesUnits=kg/ha; WaterTableConcentration=0; D0=0; DepthConstant=0; MaxDepthSoluteAccessible=0; RunoffEffectivenessAtMovingSolute=0; MaxEffectiveRunoff=0
          OutputLayers OutputNutrientLayers: Thickness=[150, 150, 300, 300, 300]
          OutputLayers OutputWaterLayers: Thickness=[200, 200, 200, 200, 200, 200, 20]
        SurfaceOrganicMatter: InitialResidueName=grass; InitialResidueType=grass; InitialResidueMass=2500; InitialStandingFraction=0; InitialCPR=0; InitialCNR=12.43
        MicroClimate: a_interception=0; b_interception=1; c_interception=0; d_interception=0; SoilHeatFluxFraction=0.4; MinimumHeightDiffForNewLayer=0; NightInterceptionFraction=0.5; ReferenceHeight=2
        Irrigation
        Manager AutomaticIrrigation
          Irrigate = True
          Season_Start = 1-Sep
          Season_End = 30-Apr
          Season_Allocation = 1000
          Refull_Frac = 0.95
          Trigger_Frac = 0.8
          Return_days = 3
          Maximum_Irrigation_Amount = 40
          Top_Depth = 800
          script: same as in SCRUMSownFromManager.Field.AutomaticIrrigation
        Operations Irrig
        Fertiliser
        Operations Fert
        Plant SCRUM
          ScrumCrop Pryegrass: HarvestIndex=0; MoisturePc=0; Proot=0; MaxRD=0; MaxHeight=0; Acover=0; ExtinctCoeff=0.55; RootNConc=0.01; StoverNConc=0.009; ProductNConc=0.016; SeedlingNConc=0.05; BaseT=0; OptT=30; MaxT=40; Legume=false; WaterStress=false
        Folder Management
          Manager ExtraVariables: same as Lincoln2012.Lincoln2012.RainShelter.ExtraVariables
          ScrumManagement Sow: CropName=Pryegrass; EstablishDate=2014-03-22; EstablishStage=Seed; PlantingDepth=15; HarvestDate=2015-01-28; HarvestStage=Maturity; ExpectedYield=5; FieldLoss=0; ResidueRemoval=0
        BiomassRemovalEvents: RemovalType=0; StageToSet=3; RemovalDatesInput=24/10/2014
          BiomassRemovals:
            PlantName  OrganName  TypeString  LiveToRemove  DeadToRemove  LiveToResidue  DeadToResidue
            SCRUM      Product    Cutting     0.92          0             0              0
            SCRUM      Stover     Cutting     0.92          0             0              0
            SCRUM      Root       Cutting     0             0             0              0
            SCRUM      Nodule     Cutting     0             0             0              0
          Plant PlantToRemoveFrom: same as PRyegrass.PRyegrass.Field.SCRUM
        Report: EventNames=[Clock].DoReport
          VariableNames:
            [Clock].Today
            [ExtraVariables].Script.AccumPlantN
            [ExtraVariables].Script.AccumMineralisation
            [ExtraVariables].Script.AccumDenit
            [ExtraVariables].Script.AccumFert
            [ExtraVariables].Script.AccumLeach
            [ExtraVariables].Script.AccumDetach
            [ExtraVariables].Script.DeltaSoilOMN
            [ExtraVariables].Script.DeltaSurfaceOMN
            [ExtraVariables].Script.DeltaSoilMineralN
            [ExtraVariables].Script.SWC
            [ExtraVariables].Script.DUL
            [ExtraVariables].Script.OutFlowLat
            [ExtraVariables].Script.AccumEO
            [ExtraVariables].Script.AccumEP
            [ExtraVariables].Script.AccumES
            [ExtraVariables].Script.AccumDrainage
            [ExtraVariables].Script.AccumRunoff
            [ExtraVariables].Script.AccumRainfall
            [ExtraVariables].Script.AccumIrrigation
            [ExtraVariables].Script.AccumOutflowLat
            [ExtraVariables].Script.SoilWaterDeficit
            [ExtraVariables].Script.SoilNitrogenContent
            [ExtraVariables].Script.FomN
            [ExtraVariables].Script.HumN
            [ExtraVariables].Script.BiomN
            [ExtraVariables].Script.DltNMinRes
            [ExtraVariables].Script.DltNMinTot
            [Soil].Water.Volumetric
            [Soil].OutputNutrientLayers.MineralN
            [Soil].Nutrient.MineralisedN
            sum([Soil].Nutrient.MineralisedN[1:5]) as ProfileMineralisedN
            [Soil].SoilWater.Eo
            [Soil].SoilWater.Es
            [Soil].SoilWater.Drainage
            [Soil].SoilWater.Runoff
            [Soil].OutputWaterLayers.SWmm
            sum([Soil].Water.MM[1:8]) as ProfileWater
            [Soil].NO3.kgha
            [SCRUM].Product.Live.Wt* 10 as Product.Wt
            [SCRUM].Product.Live.Wt
            [SCRUM].Stover.Live.Wt
            [SCRUM].Stover.Live.Wt*10 as Stover.Wt
            ([SCRUM].Stover.Live.Wt + [SCRUM].Product.Live.Wt)* 10 as AboveTotal.Wt
            [SCRUM].Root.Live.Wt
            [SCRUM].Product.Live.N
            [SCRUM].Product.Live.N *10 as ProductN.Wt
            [SCRUM].Stover.Live.N
            [SCRUM].Stover.Live.N *10 as StoverN.Wt
            ([SCRUM].Stover.Live.N + [SCRUM].Product.Live.N)*10 as AboveTotalN.Wt
            [SCRUM].Root.Live.N
            [SCRUM].Root.WaterUptake
            [SCRUM].Stover.Transpiration
            [SCRUM].Stover.WaterDemand
            [SCRUM].Root.Depth
            (-[SCRUM].Root.NUptake) as UptakeN
            [SCRUM].Stover.CoverTotal
            [SCRUM].Stover.LAI
            [SCRUM].Stover.Height
            [SCRUM].Phenology.Stage
            [SCRUM].AboveGround.N
            [SCRUM].AboveGround.Wt
            [SCRUM].Total.N
            [SCRUM].Total.Wt *10 as Total.Wt
            [SCRUM].Total.Wt
            [SCRUM].Arbitrator.N.TotalPlantDemand
            [SCRUM].Arbitrator.N.TotalPlantSupply
            [SCRUM].Arbitrator.DM.TotalFixationSupply
            [SCRUM].Arbitrator.DM.TotalPlantDemand
            [SCRUM].Arbitrator.DM.Allocated
            [SCRUM].Arbitrator.DM.SinkLimitation
            [SCRUM].Arbitrator.DM.NutrientLimitation
            [SCRUM].Stover.MaximumNConc
            [SCRUM].Stover.MinimumNConc
            [SCRUM].Stover.Live.NConc
            [SCRUM].Stover.Live.NConc
            [SCRUM].Product.Live.NConc
            [SCRUM].Stover.Fw
            [SCRUM].Arbitrator.FN
            [SCRUM].Phenology.CurrentStageName
        Report BaseReport: same as FARABlock.ABlock.Field.BaseReport
  Experiment NCRS2021
    Factors
      Factor N: Specification=[Fert]
        Operations Level1
          2020-10-23  [Fertiliser].Apply(13, [Fertiliser].Types.UreaN, 10);
        Operations Level2
          2020-10-23  [Fertiliser].Apply(13, [Fertiliser].Types.UreaN, 10);
          2020-12-07  [Fertiliser].Apply(114, [Fertiliser].Types.UreaN, 10);
          2021-12-02  [Fertiliser].Apply(168, [Fertiliser].Types.UreaN, 10);
          2022-12-07  [Fertiliser].Apply(160, [Fertiliser].Types.UreaN, 10);
        Operations Level3
          2020-10-23  [Fertiliser].Apply(13, [Fertiliser].Types.UreaN, 10);
          2020-12-07  [Fertiliser].Apply(317, [Fertiliser].Types.UreaN, 10);
          2021-12-02  [Fertiliser].Apply(241, [Fertiliser].Types.UreaN, 10);
          2022-12-02  [Fertiliser].Apply(275, [Fertiliser].Types.UreaN, 10);
    Simulation NCRS2021
      Weather: FileName=Ruakura.met
      Clock: Start=2020-10-01; End=2021-03-30
      Summary
      SoilArbitrator Soil Arbitrator
      Zone Field: Area=1; Slope=0; AspectAngle=0; Altitude=50
        SurfaceOrganicMatter: InitialResidueName=grass; InitialResidueType=grass; InitialResidueMass=0; InitialStandingFraction=0; InitialCPR=0; InitialCNR=12.43
        Soil: SoilType=Well drained deep allophanic soil; LocalName=Horotiu Silt Loam; Site=Ruakura; NearestTown=Hamilton; Region=Wiakato; Country=New Zealand; Latitude=-37.78; Longitude=0
          Physical
            Thickness  ParticleSizeClay  ParticleSizeSand  Rocks  BD     AirDry  LL15   DUL    SAT    KS
            100        17.6              33.8              0      0.865  0.081   0.246  0.551  0.588  13368
            100        16.4              33.9              0      0.835  0.068   0.207  0.551  0.605  7114.4
            400        16.4              35.9              0      0.805  0.067   0.203  0.51   0.616  6216.4
            300        29                46.3              0      0.83   0.085   0.259  0.519  0.625  3257
            300        18.4              53.5              0      0.82   0.091   0.276  0.514  0.628  6716.9
            SoilCrop SCRUMSoil: LL=[0.246, 0.207, 0.203, 0.259, 0.276]; KL=[0.1, 0.09, 0.04, 0.02, 0.01]; XF=[1, 1, 1, 1, 1]
          WaterBalance SoilWater: SummerDate=1-Nov; SummerU=6; SummerCona=3.5; WinterDate=1-apr; WinterU=2; WinterCona=2; DiffusConst=88; DiffusSlope=35; Salb=0.13; CN2Bare=73; CNRed=20; CNCov=0.8; DischargeWidth=0; CatchmentArea=0; PSIDul=-100
            Thickness  SWCON  KLAT
            100        0.686  0
            100        0.607  0
            400        0.589  0
            300        0.542  0
            300        0.583  0
          Organic: FOMCNRatio=25; CarbonUnits=Total
            Thickness  Carbon  SoilCNRatio  FBiom  FInert  FOM
            100        2.2     10.6         0.125  0.4     288
            100        1.5     10.8         0.055  0.5     300
            400        0.8     11           0.05   0.6     300
            300        0.7     11.3         0.04   0.6     300
            300        0.7     12.1         0.03   0.957   40
          Chemical: Thickness=[100, 100, 400, 300, 300]; PH=[6, 6, 6, 6, 6]; PHUnits=Water
          Nutrient
          CERESSoilTemperature Temperature
          Water: Thickness=[100, 100, 400, 300, 300]; InitialValues=[0.551, 0.551, 0.51, 0.519, 0.514]; InitialPAWmm=337.1; RelativeTo=LL15; FilledFromTop=false
          Solute NO3: Thickness=[100, 100, 400, 300, 300]; InitialValues=[10, 10, 20, 40, 1]; InitialValuesUnits=kg/ha; WaterTableConcentration=0; D0=0; DepthConstant=0; MaxDepthSoluteAccessible=0; RunoffEffectivenessAtMovingSolute=0; MaxEffectiveRunoff=0
          Solute NH4: Thickness=[100, 100, 400, 300, 300]; InitialValues=[0.1, 0.1, 0.075, 0.05, 0.01]; InitialValuesUnits=ppm; WaterTableConcentration=0; D0=0; DepthConstant=0; MaxDepthSoluteAccessible=0; RunoffEffectivenessAtMovingSolute=0; MaxEffectiveRunoff=0
          Solute Urea: Thickness=[100, 100, 400, 300, 300]; InitialValues=[0, 0, 0, 0, 0]; InitialValuesUnits=kg/ha; WaterTableConcentration=0; D0=0; DepthConstant=0; MaxDepthSoluteAccessible=0; RunoffEffectivenessAtMovingSolute=0; MaxEffectiveRunoff=0
          OutputLayers OutputNutrientLayers: Thickness=[300, 300, 300]
          OutputLayers OutputWaterLayers: Thickness=[200, 200, 200, 200, 200, 200]
        MicroClimate: a_interception=0; b_interception=1; c_interception=0; d_interception=0; SoilHeatFluxFraction=0.4; MinimumHeightDiffForNewLayer=0; NightInterceptionFraction=0.5; ReferenceHeight=2
        Irrigation
        Operations Irrig
        Fertiliser
        Operations Fert
        Plant SCRUM
          ScrumCrop Maize: HarvestIndex=0.5; MoisturePc=14; Proot=0.1; MaxRD=2000; MaxHeight=1800; Acover=0.97; ExtinctCoeff=0.55; RootNConc=0.01; StoverNConc=0.009; ProductNConc=0.012; SeedlingNConc=0.03; BaseT=10; OptT=30; MaxT=40; Legume=false; WaterStress=true
        Folder Management
          Manager ExtraVariables: same as Lincoln2012.Lincoln2012.RainShelter.ExtraVariables
          ScrumManagement SowMaize2020: CropName=Maize; EstablishDate=2020-10-23; EstablishStage=Seed; PlantingDepth=15; HarvestDate=2021-03-17; HarvestStage=Maturity; ExpectedYield=16; FieldLoss=0; ResidueRemoval=0
          ScrumManagement SowMaize2021: CropName=Maize; EstablishDate=2021-10-15; EstablishStage=Seed; PlantingDepth=15; HarvestDate=2022-02-18; HarvestStage=Maturity; ExpectedYield=15
          ScrumManagement SowMaize2022: CropName=Maize; EstablishDate=2022-10-18; EstablishStage=Seed; PlantingDepth=15; HarvestDate=2023-03-06; HarvestStage=Maturity; ExpectedYield=17.5
          Manager Tillage on a fixed date
            TillageDate = 20-mar
            Fraction = 0.25
            Depth = 0
```csharp
using Models.Soils;
using System;
using System.Linq;
using Models.Core;
using Models.PMF;
using APSIM.Shared.Utilities;
using Models.Surface;

namespace Models
{
    [Serializable]
    public class Script : Model
    {
        [Link] Clock Clock;
        [Link] SurfaceOrganicMatter SOM;
        
        [Description("Tillage Date")]
        public string TillageDate { get; set; }
        
        [Description("Fraction of Residues To Incorporate (0-1)")]
        public double Fraction { get; set; }

        [Description("Depth of Tillage (mm)")]
        public double Depth { get; set; }

        [EventSubscribe("DoManagement")]
        private void OnDoManagement(object sender, EventArgs e)
        {
            if (DateUtilities.WithinDates(TillageDate, Clock.Today, TillageDate))
                SOM.Incorporate(Fraction, Depth);
        }
    }
}
```
        Report: EventNames=[Clock].DoReport
          VariableNames:
            [Clock].Today
            [ExtraVariables].Script.AccumPlantN
            [ExtraVariables].Script.AccumMineralisation
            [ExtraVariables].Script.AccumDenit
            [ExtraVariables].Script.AccumFert
            [ExtraVariables].Script.AccumLeach
            [ExtraVariables].Script.AccumDetach
            [ExtraVariables].Script.DeltaSoilOMN
            [ExtraVariables].Script.DeltaSurfaceOMN
            [ExtraVariables].Script.DeltaSoilMineralN
            [ExtraVariables].Script.SWC
            [ExtraVariables].Script.DUL
            [ExtraVariables].Script.OutFlowLat
            [ExtraVariables].Script.AccumEO
            [ExtraVariables].Script.AccumEP
            [ExtraVariables].Script.AccumES
            [ExtraVariables].Script.AccumDrainage
            [ExtraVariables].Script.AccumRunoff
            [ExtraVariables].Script.AccumRainfall
            [ExtraVariables].Script.AccumIrrigation
            [ExtraVariables].Script.AccumOutflowLat
            [ExtraVariables].Script.SoilWaterDeficit
            [ExtraVariables].Script.SoilNitrogenContent
            [ExtraVariables].Script.FomN
            [ExtraVariables].Script.HumN
            [ExtraVariables].Script.BiomN
            [ExtraVariables].Script.DltNMinRes
            [ExtraVariables].Script.DltNMinTot
            [Soil].Water.Volumetric
            [Soil].OutputNutrientLayers.MineralN
            [Soil].Nutrient.MineralisedN
            //sum([Soil].Nutrient.MineralisedN[1:5]) as ProfileMineralisedN
            [Soil].SoilWater.Eo
            [Soil].SoilWater.Es
            [Soil].SoilWater.Drainage
            [Soil].SoilWater.Runoff
            [Soil].OutputWaterLayers.SWmm
            //sum([Soil].Water.MM[1:8]) as ProfileWater
            [Soil].NO3.kgha
            [SCRUM].Product.Live.Wt* 10 as Product.Wt
            [SCRUM].Product.Live.Wt
            [SCRUM].Stover.Live.Wt
            [SCRUM].Stover.Live.Wt *10 as Stover.Wt
            ([SCRUM].Stover.Live.Wt + [SCRUM].Product.Live.Wt)* 10 as AboveTotal.Wt
            [SCRUM].Root.Live.Wt
            [SCRUM].Product.Live.N
            [SCRUM].Product.Live.N *10 as ProductN.Wt
            [SCRUM].Stover.Live.N
            [SCRUM].Stover.Live.N *10 as StoverN.Wt
            ([SCRUM].Stover.Live.N + [SCRUM].Product.Live.N)*10 as AboveTotalN.Wt
            [SCRUM].Root.Live.N
            [SCRUM].Root.WaterUptake
            [SCRUM].Stover.Transpiration
            [SCRUM].Stover.WaterDemand
            [SCRUM].Root.Depth
            (-[SCRUM].Root.NUptake) as UptakeN
            [SCRUM].Stover.CoverTotal
            [SCRUM].Stover.LAI
            [SCRUM].Stover.Height
            [SCRUM].Phenology.Stage
            [SCRUM].AboveGround.N
            [SCRUM].AboveGround.Wt
            [SCRUM].Total.N
            [SCRUM].Total.Wt *10 as Total.Wt
            [SCRUM].Total.Wt
            [SCRUM].Arbitrator.N.TotalPlantDemand
            [SCRUM].Arbitrator.N.TotalPlantSupply
            [SCRUM].Arbitrator.DM.TotalFixationSupply
            [SCRUM].Arbitrator.DM.TotalPlantDemand
            [SCRUM].Arbitrator.DM.Allocated
            [SCRUM].Arbitrator.DM.SinkLimitation
            [SCRUM].Arbitrator.DM.NutrientLimitation
            [SCRUM].Stover.MaximumNConc
            [SCRUM].Stover.MinimumNConc
            [SCRUM].Stover.Live.NConc
            [SCRUM].Stover.Live.NConc
            [SCRUM].Product.Live.NConc
            [SCRUM].Stover.Fw
            [SCRUM].Arbitrator.FN
            [SCRUM].Phenology.CurrentStageName
        Report BaseReport: same as FARABlock.ABlock.Field.BaseReport
  Experiment NCRS2022
    Factors: same as NCRS2021.Factors
    Simulation NCRS2022
      Weather: FileName=Ruakura.met
      Clock: Start=2021-09-01; End=2022-02-28
      Summary
      SoilArbitrator Soil Arbitrator
      Zone Field: Area=1; Slope=0; AspectAngle=0; Altitude=50
        SurfaceOrganicMatter: InitialResidueName=grass; InitialResidueType=grass; InitialResidueMass=0; InitialStandingFraction=0; InitialCPR=0; InitialCNR=12.43
        Soil: SoilType=Well drained deep allophanic soil; LocalName=Horotiu Silt Loam; Site=Ruakura; NearestTown=Hamilton; Region=Wiakato; Country=New Zealand; Latitude=-37.78; Longitude=0
          Physical: same as NCRS2021.NCRS2021.Field.Soil.Physical
          WaterBalance SoilWater: same as NCRS2021.NCRS2021.Field.Soil.SoilWater
          Organic: FOMCNRatio=25; CarbonUnits=Total
            Thickness  Carbon  SoilCNRatio  FBiom  FInert  FOM
            100        2.2     10.6         0.125  0.25    600
            100        1.5     10.8         0.055  0.25    600
            400        0.8     11           0.05   0.25    400
            300        0.7     11.3         0.04   0.25    400
            300        0.7     12.1         0.03   0.957   40
          Chemical: Thickness=[100, 100, 400, 300, 300]; PH=[6, 6, 6, 6, 6]; PHUnits=Water
          Nutrient
          CERESSoilTemperature Temperature
          Water: Thickness=[100, 100, 400, 300, 300]; InitialValues=[0.551, 0.551, 0.51, 0.519, 0.514]; InitialPAWmm=337.1; RelativeTo=LL15; FilledFromTop=false
          Solute NO3: Thickness=[100, 100, 400, 300, 300]; InitialValues=[5, 5, 3, 5, 1]; InitialValuesUnits=kg/ha; WaterTableConcentration=0; D0=0; DepthConstant=0; MaxDepthSoluteAccessible=0; RunoffEffectivenessAtMovingSolute=0; MaxEffectiveRunoff=0
          Solute NH4: same as NCRS2021.NCRS2021.Field.Soil.NH4
          Solute Urea: Thickness=[100, 100, 400, 300, 300]; InitialValues=[0, 0, 0, 0, 0]; InitialValuesUnits=kg/ha; WaterTableConcentration=0; D0=0; DepthConstant=0; MaxDepthSoluteAccessible=0; RunoffEffectivenessAtMovingSolute=0; MaxEffectiveRunoff=0
          OutputLayers OutputNutrientLayers: Thickness=[300, 300, 300]
          OutputLayers OutputWaterLayers: Thickness=[200, 200, 200, 200, 200, 200]
        MicroClimate: a_interception=0; b_interception=1; c_interception=0; d_interception=0; SoilHeatFluxFraction=0.4; MinimumHeightDiffForNewLayer=0; NightInterceptionFraction=0.5; ReferenceHeight=2
        Irrigation
        Operations Irrig
        Fertiliser
        Operations Fert
        Plant SCRUM: same as NCRS2021.NCRS2021.Field.SCRUM
        Folder Management
          Manager ExtraVariables: same as Lincoln2012.Lincoln2012.RainShelter.ExtraVariables
          ScrumManagement SowMaize2020: CropName=Maize; EstablishDate=2020-10-23; EstablishStage=Seed; PlantingDepth=15; HarvestDate=2021-03-16; HarvestStage=Maturity; ExpectedYield=17; FieldLoss=0; ResidueRemoval=0
          ScrumManagement SowMaize2021: CropName=Maize; EstablishDate=2021-10-15; EstablishStage=Seed; PlantingDepth=15; HarvestDate=2022-02-19; HarvestStage=Maturity; ExpectedYield=14
          ScrumManagement SowMaize2022: CropName=Maize; EstablishDate=2022-10-18; EstablishStage=Seed; PlantingDepth=15; HarvestDate=2023-03-06; HarvestStage=Maturity; ExpectedYield=17.5
          Manager Tillage on a fixed date: same as NCRS2021.NCRS2021.Field.Management.Tillage on a fixed date
        Report: same as NCRS2021.NCRS2021.Field.Report
        Report BaseReport: same as FARABlock.ABlock.Field.BaseReport
  Experiment NCRS2023
    Factors: same as NCRS2021.Factors
    Simulation NCRS2023
      Weather: FileName=Ruakura.met
      Clock: Start=2022-10-01; End=2023-03-15
      Summary
      SoilArbitrator Soil Arbitrator
      Zone Field: Area=1; Slope=0; AspectAngle=0; Altitude=50
        SurfaceOrganicMatter: InitialResidueName=grass; InitialResidueType=grass; InitialResidueMass=0; InitialStandingFraction=0; InitialCPR=0; InitialCNR=12.43
        Soil: SoilType=Well drained deep allophanic soil; LocalName=Horotiu Silt Loam; Site=Ruakura; NearestTown=Hamilton; Region=Wiakato; Country=New Zealand; Latitude=-37.78; Longitude=0
          Physical: same as NCRS2021.NCRS2021.Field.Soil.Physical
          WaterBalance SoilWater: same as NCRS2021.NCRS2021.Field.Soil.SoilWater
          Organic: FOMCNRatio=20; CarbonUnits=Total
            Thickness  Carbon  SoilCNRatio  FBiom  FInert  FOM
            100        2.2     10.6         0.125  0.2     400
            100        1.5     10.8         0.055  0.2     400
            400        0.8     11           0.05   0.2     400
            300        0.7     11.3         0.04   0.2     400
            300        0.7     12.1         0.03   0.957   40
          Chemical: Thickness=[100, 100, 400, 300, 300]; PH=[6, 6, 6, 6, 6]; PHUnits=Water
          Nutrient
          CERESSoilTemperature Temperature
          Water: Thickness=[100, 100, 400, 300, 300]; InitialValues=[0.551, 0.551, 0.51, 0.519, 0.514]; InitialPAWmm=337.1; RelativeTo=LL15; FilledFromTop=false
          Solute NO3: Thickness=[100, 100, 400, 300, 300]; InitialValues=[10, 10, 7, 20, 1]; InitialValuesUnits=kg/ha; WaterTableConcentration=0; D0=0; DepthConstant=0; MaxDepthSoluteAccessible=0; RunoffEffectivenessAtMovingSolute=0; MaxEffectiveRunoff=0
          Solute NH4: same as NCRS2021.NCRS2021.Field.Soil.NH4
          Solute Urea: Thickness=[100, 100, 400, 300, 300]; InitialValues=[0, 0, 0, 0, 0]; InitialValuesUnits=kg/ha; WaterTableConcentration=0; D0=0; DepthConstant=0; MaxDepthSoluteAccessible=0; RunoffEffectivenessAtMovingSolute=0; MaxEffectiveRunoff=0
          OutputLayers OutputNutrientLayers: Thickness=[300, 300, 300]
          OutputLayers OutputWaterLayers: Thickness=[200, 200, 200, 200, 200, 200]
        MicroClimate: a_interception=0; b_interception=1; c_interception=0; d_interception=0; SoilHeatFluxFraction=0.4; MinimumHeightDiffForNewLayer=0; NightInterceptionFraction=0.5; ReferenceHeight=2
        Irrigation
        Operations Irrig
        Fertiliser
        Operations Fert
        Plant SCRUM: same as NCRS2021.NCRS2021.Field.SCRUM
        Folder Management
          Manager ExtraVariables: same as Lincoln2012.Lincoln2012.RainShelter.ExtraVariables
          ScrumManagement SowMaize2020: CropName=Maize; EstablishDate=2020-10-23; EstablishStage=Seed; PlantingDepth=15; HarvestDate=2021-03-16; HarvestStage=Maturity; ExpectedYield=17; FieldLoss=0; ResidueRemoval=0
          ScrumManagement SowMaize2021: CropName=Maize; EstablishDate=2021-10-15; EstablishStage=Seed; PlantingDepth=15; HarvestDate=2022-02-18; HarvestStage=Maturity; ExpectedYield=15
          ScrumManagement SowMaize2022: CropName=Maize; EstablishDate=2022-10-18; EstablishStage=Seed; PlantingDepth=15; HarvestDate=2023-03-07; HarvestStage=Maturity; ExpectedYield=15
          Manager Tillage on a fixed date: same as NCRS2021.NCRS2021.Field.Management.Tillage on a fixed date
        Report: same as NCRS2021.NCRS2021.Field.Report
        Report BaseReport: same as FARABlock.ABlock.Field.BaseReport
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